! Copyright (C) 2024 ANSYS, Inc. and/or its affiliates.
! SPDX-License-Identifier: MIT
!
!
! Permission is hereby granted, free of charge, to any person obtaining a copy
! of this software and associated documentation files (the "Software"), to deal
! in the Software without restriction, including without limitation the rights
! to use, copy, modify, merge, publish, distribute, sublicense, and/or sell
! copies of the Software, and to permit persons to whom the Software is
! furnished to do so, subject to the following conditions:
!
! The above copyright notice and this permission notice shall be included in all
! copies or substantial portions of the Software.
!
! THE SOFTWARE IS PROVIDED "AS IS", WITHOUT WARRANTY OF ANY KIND, EXPRESS OR
! IMPLIED, INCLUDING BUT NOT LIMITED TO THE WARRANTIES OF MERCHANTABILITY,
! FITNESS FOR A PARTICULAR PURPOSE AND NONINFRINGEMENT. IN NO EVENT SHALL THE
! AUTHORS OR COPYRIGHT HOLDERS BE LIABLE FOR ANY CLAIM, DAMAGES OR OTHER
! LIABILITY, WHETHER IN AN ACTION OF CONTRACT, TORT OR OTHERWISE, ARISING FROM,
! OUT OF OR IN CONNECTION WITH THE SOFTWARE OR THE USE OR OTHER DEALINGS IN THE
! SOFTWARE.

/COM,ANSYS MEDIA REL. 2023R2 (05/12/2023) REF. VERIF. MANUAL: REL. 2023R2
/verify,vm-nr1677-2-4c-a
/title,vm-nr1677-2-4c-a,NRC piping benchmarks problems,Volume II,Problem 4c

/com, *******************************************************************************
/com, Reference: Piping benchmark problems,Dynamic analysis independant support
/com,            motion response spectrum method, P. Bezler, M. Subudhi and
/com,            M.Hartzman, NUREG/CR--1677-Vol.2, August 1985.
/com,
/com,
/com,
/com, Element used: Pipe16, Pipe18, Combin14 and Mass21
/com,
/com, Results comparsion:
/com, The following results are compared against NRC piping benchmark values
/com, 1. Frequencies obtained from modal solution.
/com, 2. Maximum nodal displacements and rotations obtained from spectrum solution.
/com, 3. Element forces/moments obtained from spectrum solution.
/com, 4. Reaction forces obtained from spectrum solution.
/com,
/com,
/com, *******************************************************************************

/out,scratch

/prep7

YoungModulus = 0.283e+8				! Young's Modulus
Nu = 0.3						! Minor Poisson's Ratio
ShearModulus = YoungModulus/(2*(1+Nu))	! Shear Modulus
K = 0.911e-5					! Thermal Expansion
maxm = 50						! No. of Modes Extracted

/com,
/com, Section Property
/com,******************

/com,
/com, Wall Thickness
/com,----------------

WTick_1 = 2.25
WTick_2 = 3.44
WTick_3 = 1.0
WTick_4 = 2.64
WTick_5 = 74.775

WTick_6 = 1.0
WTick_7 = 2.64
WTick_8 = 0.7180
WTick_9 = 1.62
WTick_10 = 46.035

WTick_11 = 0.7180
WTick_12 = 0.906
WTick_13 = 0.365

/com,
/com, Outer Diameter
/com,----------------

OD_1 = 32.25
OD_2 = 15.625
OD_3 = 10.75
OD_4 = 16.03
OD_5 = 160.3

OD_6 = 10.75
OD_7 = 16.03
OD_8 = 6.625
OD_9 = 9.87
OD_10 = 98.7

OD_11 = 6.625
OD_12 = 8.625
OD_13 = 10.75

/com,
/com, Bend Radius
/com,--------------

RADCUR_1 = 15.0
RADCUR_2 = 14.9
RADCUR_3 = 9.0
RADCUR_4 = 12.0
RADCUR_5 = 40.0
RADCUR_6 = 8.0

/com,-----------------------------------------------------------------------------------

/com,
/com, Element Types
/com,***************

et,1,pipe16
et,2,pipe16
et,3,pipe16
et,4,pipe16
et,5,pipe16
et,6,pipe16
et,7,pipe16
et,8,pipe16
et,9,pipe16
et,10,pipe16
et,11,pipe16
et,12,pipe16
et,13,pipe16

et,14,pipe18
et,15,pipe18
et,16,pipe18
et,17,pipe18
et,18,pipe18
et,19,pipe18
et,20,pipe18
et,21,pipe18
et,22,pipe18

et,23,mass21						! 3D Mass without rotatary inertia
keyopt,23,3,2
et,24,mass21
keyopt,24,3,2
et,25,mass21
keyopt,25,3,2
et,26,mass21
keyopt,26,3,2
et,27,mass21
keyopt,27,3,2
et,28,mass21
keyopt,28,3,2
et,29,mass21
keyopt,29,3,2
et,30,mass21
keyopt,30,3,2
et,31,mass21
keyopt,31,3,2
et,32,mass21
keyopt,32,3,2
et,33,mass21
keyopt,33,3,2
et,34,mass21
keyopt,34,3,2
et,35,mass21
keyopt,35,3,2
et,36,mass21
keyopt,36,3,2
et,37,mass21
keyopt,37,3,2
et,38,mass21
keyopt,38,3,2
et,39,mass21
keyopt,39,3,2
et,40,mass21
keyopt,40,3,2
et,41,mass21
keyopt,41,3,2
et,42,mass21
keyopt,42,3,2
et,43,mass21
keyopt,43,3,2
et,44,mass21
keyopt,44,3,2
et,45,mass21
keyopt,45,3,2
et,46,mass21
keyopt,46,3,2
et,47,mass21
keyopt,47,3,2

et,48,combin14,,1						! Spring Elements Types and Real constants
keyopt,48,2,1						! X Degree of Freedom
et,49,combin14,,2
keyopt,49,2,2						! Y Degree of Freedom
et,50,combin14,,3
keyopt,50,2,3						! Z Degree of Freedom
et,51,combin14,,2
keyopt,51,2,2						! Y Degree of Freedom
et,52,combin14,,2
keyopt,52,2,2						! Y Degree of Freedom
et,53,combin14,,3
keyopt,53,2,3						! Z Degree of Freedom
et,54,combin14,,1
keyopt,54,2,1						! X Degree of Freedom
et,55,combin14,,2
keyopt,55,2,2						! Y Degree of Freedom
et,56,combin14,,1
keyopt,56,2,1						! X Degree of Freedom
et,57,combin14,,1
keyopt,57,2,1						! X Degree of Freedom
et,58,combin14,,2
keyopt,58,2,2						! Y Degree of Freedom
et,59,combin14,,1
keyopt,59,2,1						! X Degree of Freedom
et,60,combin14,,2
keyopt,60,2,2						! Y Degree of Freedom
et,61,combin14,,1
keyopt,61,2,1						! X Degree of Freedom
et,62,combin14,,2
keyopt,62,2,2						! Y Degree of Freedom
et,63,combin14,,2
keyopt,63,2,2						! Y Degree of Freedom
et,64,combin14,,1
keyopt,64,2,1						! X Degree of Freedom
et,65,combin14,,2
keyopt,65,2,2						! Y Degree of Freedom
et,66,combin14,,3
keyopt,66,2,3						! Z Degree of Freedom
et,67,combin14,,2
keyopt,67,2,2						! Y Degree of Freedom
et,68,combin14,,1
keyopt,68,2,1						! X Degree of Freedom
et,69,combin14,,1
keyopt,69,2,1						! X Degree of Freedom
et,70,combin14,,2
keyopt,70,2,2						! Y Degree of Freedom
et,71,combin14,,1
keyopt,71,2,1						! X Degree of Freedom
et,72,combin14,,2
keyopt,72,2,2						! Y Degree of Freedom
et,73,combin14,,1
keyopt,73,2,1						! X Degree of Freedom
et,74,combin14,,1
keyopt,74,2,1						! X Degree of Freedom
et,75,combin14,,3
keyopt,75,2,3						! Z Degree of Freedom
et,76,combin14,,2
keyopt,76,2,2						! Y Degree of Freedom
et,77,combin14,,2
keyopt,77,2,2						! Y Degree of Freedom
et,78,combin14,,1
keyopt,78,2,1						! X Degree of Freedom
et,79,combin14,,2
keyopt,79,2,2						! Y Degree of Freedom
et,80,combin14,,2
keyopt,80,2,2						! Y Degree of Freedom
et,81,combin14,,1
keyopt,81,2,1						! X Degree of Freedom
et,82,combin14,,2
keyopt,82,2,2						! Y Degree of Freedom
et,83,combin14,,3
keyopt,83,2,3						! Z Degree of Freedom

/com,----------------------------------------------------------------------------------

/com

/com, Real Constants
/com,****************

r, 1,OD_1,WTick_1
r, 2,OD_2,WTick_2
r, 3,OD_3,WTick_3
r, 4,OD_4,WTick_4
r, 5, OD_5,WTick_5
r, 6, OD_6,WTick_6
r, 7, OD_7,WTick_7
r, 8, OD_8,WTick_8
r, 9, OD_9,WTick_9
r, 10, OD_10,WTick_10
r, 11, OD_11,WTick_11
r, 12, OD_12,WTick_12
r, 13, OD_13,WTick_13

r, 14, OD_3, WTick_3,RADCUR_1
r, 15, OD_6, WTick_6,RADCUR_1
r, 16, OD_6, WTick_6,RADCUR_2
r, 17, OD_13, WTick_13,RADCUR_1
r, 18, OD_13, WTick_13,RADCUR_2
r, 19, OD_8, WTick_8,RADCUR_3
r, 20, OD_12, WTick_12,RADCUR_4
r, 21, OD_12, WTick_12,RADCUR_5
r, 22, OD_12, WTick_12,RADCUR_6

r,23,1.69306
r,24,5.07505
r,25,4.96894
r,26,1.20212
r,27,1.42495
r,28,1.88768
r,29,2.18323
r,30,2.4397
r,31,2.98188
r,32,1.41874
r,33,1.04943e+1
r,34,9.30124e-1
r,35,1.6118
r,36,6.74431e-1
r,37,6.43116e-1
r,38,1.06962
r,39,1.20549
r,40,1.05642
r,41,1.25388
r,42,1.3543
r,43,6.66149e-1
r,44,2.27769
r,45,1.15217
r,46,1.23214
r,47,1.52976

r,48, 0.1e+9
r,49, 0.1e+9
r,50, 0.1e+9
r,51, 0.1080e+4
r,52, 0.6001e+5
r,53, 0.6001e+5
r,54, 0.6001e+5
r,55, 0.7541e+6
r,56, 0.7541e+6
r,57, 0.6001e+5
r,58, 0.6000e+3
r,59, 0.6001e+5
r,60, 0.7601e+5
r,61, 0.6001e+5
r,62, 0.8000e+3
r,63, 0.6001e+5
r,64, 0.1000e+9
r,65, 0.1000e+9
r,66, 0.1000e+9
r,67, 0.2600e+3
r,68, 0.5901e+5
r,69, 0.2400e+5
r,70, 0.7601e+5
r,71, 0.2801e+5
r,72, 0.2460e+6
r,73, 0.6001e+5
r,74, 0.6001e+5
r,75, 0.7501e+5
r,76, 0.4660e+6
r,77, 0.3400e+3
r,78, 0.6001e+5
r,79, 0.5000e+6
r,80, 0.5000e+6
r,81, 0.1000e+9
r,82, 0.1000e+9
r,83, 0.1000e+9

/com,------------------------------------------------------------------------------------

/com, Material Properties
/com,*********************

MP,EX,  1, YoungModulus
MP,NUXY,1, Nu
MP,GXY ,1, ShearModulus
MP,ALPX,1, K

MP,EX,  2, YoungModulus
MP,NUXY,2, Nu
MP,GXY ,2, ShearModulus
MP,ALPX,2, K

MP,EX,  3, YoungModulus
MP,NUXY,3, Nu
MP,GXY ,3, ShearModulus
MP,ALPX,3, K

MP,EX,  4, YoungModulus
MP,NUXY,4, Nu
MP,GXY ,4, ShearModulus
MP,ALPX,4, K

MP,EX,  5, YoungModulus
MP,NUXY,5, Nu
MP,GXY ,5, ShearModulus
MP,ALPX,5, K

MP,EX,  6, YoungModulus
MP,NUXY,6, Nu
MP,GXY ,6, ShearModulus
MP,ALPX,6, K

MP,EX,  7, YoungModulus
MP,NUXY,7, Nu
MP,GXY ,7, ShearModulus
MP,ALPX,7, K

MP,EX,  8, YoungModulus
MP,NUXY,8, Nu
MP,GXY ,8, ShearModulus
MP,ALPX,8, K

MP,EX,  9, YoungModulus
MP,NUXY,9, Nu
MP,GXY ,9, ShearModulus
MP,ALPX,9, K

MP,EX,  10, YoungModulus
MP,NUXY,10, Nu
MP,GXY ,10, ShearModulus
MP,ALPX,10, K

MP,EX,  11, YoungModulus
MP,NUXY,11, Nu
MP,GXY ,11, ShearModulus
MP,ALPX,11, K

MP,EX,  12, YoungModulus
MP,NUXY,12, Nu
MP,GXY ,12, ShearModulus
MP,ALPX,12, K

MP,EX,  13, YoungModulus
MP,NUXY,13, Nu
MP,GXY ,13, ShearModulus
MP,ALPX,13, K

MP,EX,  14, YoungModulus
MP,NUXY,14, Nu
MP,GXY ,14, ShearModulus
MP,ALPX,14, K

MP,EX,  15, YoungModulus
MP,NUXY,15, Nu
MP,GXY ,15, ShearModulus
MP,ALPX,15, K

MP,EX,  16, YoungModulus
MP,NUXY,16, Nu
MP,GXY ,16, ShearModulus
MP,ALPX,16, K

MP,EX,  17, YoungModulus
MP,NUXY,17, Nu
MP,GXY ,17, ShearModulus
MP,ALPX,17, K

MP,EX,  18, YoungModulus
MP,NUXY,18, Nu
MP,GXY ,18, ShearModulus
MP,ALPX,18, K

MP,EX,  19, YoungModulus
MP,NUXY,19, Nu
MP,GXY ,19, ShearModulus
MP,ALPX,19, K

MP,EX,  20, YoungModulus
MP,NUXY,20, Nu
MP,GXY ,20, ShearModulus
MP,ALPX,20, K

MP,EX,  21, YoungModulus
MP,NUXY,21, Nu
MP,GXY ,21, ShearModulus
MP,ALPX,21, K

MP,EX,  22, YoungModulus
MP,NUXY,22, Nu
MP,GXY ,22, ShearModulus
MP,ALPX,22, K

/com,------------------------------------------------------------------------------------

/com, Nodes
/com,*******

n,1,-203.808,4715.952,139.224
n,2,-215.808,4715.952,139.224
n,3,-203.808,4703.952,139.224
n,4,-203.808,4715.952,127.224
n,5,-203.268,4719.852,154.860
n,6,-202.308,4726.800,182.748
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n,279,-616.39,5047.5,459.03

/com,------------------------------------------------------------------------------------

/com,
/com, Straight Pipe (Tangent) Elements
/com,**********************************

mat,1
type,1
real,1
e,1,5

type,2
real,2
e,5,6

type,3
real,3
e,6,7
e,8,9
e,10,11

type,4
real,4
e,11,12
e,12,13
e,13,14
e,14,16
e,31,32
e,32,34

type,5
real,5
e,14,15
e,32,33
e,77,78

type,6
real,6
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
id = 8
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
/com,
/com, Pipe Bend Elements
/com,********************

mat,1

type,14
real,14
e,7,8,6
e,9,10,11

type,15
real,15
e,19,20,21
e,27,271,26
e,271,28,29
e,35,36,37
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
/com, Point Mass without considering rotatary inertia
/com,*************************************************

type,23
real,23
e,12
e,21
e,25

type,24
real,24
e,15

type,25
real,25
e,33

type,26
real,26
e,34
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
/com,
/com, Elastic supports and anchors
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
id = 51
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
id = 79
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
/com,
/com, rotate nodes with less than 3 supports
/com,****************************************

wplane,,nx(43),ny(43),nz(43),nx(44),ny(44),nz(44),nx(45),ny(45),nz(45)
cswplane,11,0
nrotat,43
nrotat,44
csys,0

real,54
type,54
e,43,44

wplane,,nx(51),ny(51),nz(51),nx(52),ny(52),nz(52),nx(49),ny(49),nz(49)
cswplane,12,0
nrotat,51
nrotat,52
csys,0

real,56
type,56
e,51,52

wplane,,nx(56),ny(56),nz(56),nx(57),ny(57),nz(57),nx(55),ny(55),nz(55)
cswplane,13,0
nrotat,56
nrotat,57
csys,0

real,57
type,57
e,56,57

wplane,,nx(67),ny(67),nz(67),nx(68),ny(68),nz(68),nx(66),ny(66),nz(66)
cswplane,14,0
nrotat,67
nrotat,68
csys,0

real,59
type,59
e,67,68

wplane,,nx(74),ny(74),nz(74),nx(75),ny(75),nz(75),nx(72),ny(72),nz(72)
cswplane,15,0
nrotat,74
nrotat,75
csys,0

real,61
type,61
e,74,75

wplane,,nx(117),ny(117),nz(117),nx(118),ny(118),nz(118),nx(116),ny(116),nz(116)
cswplane,16,0
nrotat,117
nrotat,118
csys,0

real,69
type,69
e,117,118

wplane,,nx(127),ny(127),nz(127),nx(128),ny(128),nz(128),nx(126),ny(126),nz(126)
cswplane,17,0
nrotat,127
nrotat,128
csys,0

real,71
type,71
e,127,128

wplane,,nx(135),ny(135),nz(135),nx(136),ny(136),nz(136),nx(133),ny(133),nz(133)
cswplane,18,0
nrotat,135
nrotat,136
csys,0

real,73
type,73
e,135,136

wplane,,nx(141),ny(141),nz(141),nx(142),ny(142),nz(142),nx(140),ny(140),nz(140)
cswplane,19,0
nrotat,141
nrotat,142
csys,0

real,74
type,74
e,141,142

wplane,,nx(165),ny(165),nz(165),nx(166),ny(166),nz(166),nx(164),ny(164),nz(164)
cswplane,20,0
nrotat,165
nrotat,166
csys,0

real,78
type,78
e,165,166

/com,------------------------------------------------------------------------------------

/com,
/com, Constraints
/com,*************

nsel,s,node,,2,4
nsel,a,node,,18
nsel,a,node,,30
nsel,a,node,,38
nsel,a,node,,44
nsel,a,node,,50
nsel,a,node,,52
nsel,a,node,,57
nsel,a,node,,63
nsel,a,node,,68
nsel,a,node,,73
nsel,a,node,,75
nsel,a,node,,88
nsel,a,node,,90
nsel,a,node,,95,97
nsel,a,node,,109
nsel,a,node,,113
nsel,a,node,,118
nsel,a,node,,120
nsel,a,node,,128
nsel,a,node,,134
nsel,a,node,,136
nsel,a,node,,142
nsel,a,node,,146
nsel,a,node,,150
nsel,a,node,,158
nsel,a,node,,166
nsel,a,node,,170
nsel,a,node,,177
nsel,a,node,,193,195
d,all,all
allsel,all,all

d,1,rotx,,,,,roty,rotz
d,94,rotx,,,,,roty,rotz
d,192,rotx,,,,,roty,rotz

finish

/com,------------------------------------------------------------------------------------

/com,
/com,=============
/com,	Modal Solve
/com,=============
/com,

/solution
antype,modal					! Perform Modal Analysis
modopt,lanb,maxm
lumpm,on						! Use Lumped Mass Matrix Approximation
mxpand,maxm,,,yes					! Expand solutions with Element Calculations turned ON
solve
save

/com,
/com,===========================
/com, Compare Modal Frequencies
/com,===========================
/com,

*dim,Amode,ARRAY,maxm
*dim,Emode,ARRAY,maxm
*dim,ERmode,ARRAY,maxm
*dim,moden,ARRAY,maxm

*do,i,1,maxm
	*GET, Amode(i), MODE, i, FREQ
*enddo
*VFILL,Emode,DATA,2.612,2.914,4.337,4.66,5.734,5.833,7.359,7.769,9.952,10.329
*VFILL,Emode(11),DATA,10.679,10.943,12.03,12.286,13.251,13.407,14.429,14.72,15.253,15.553
*VFILL,Emode(21),DATA,16.172,16.797,17.23,17.275,17.453,18.71,18.898,19.993,21.46,21.523
*VFILL,Emode(31),DATA,22.736,23.281,24.067,24.593,25.117,26.516,26.935,27.509,28.662,29.542
*VFILL,Emode(41),DATA,30.596,31.274,32.283,35.484,36.022,36.394,36.769,38.0,38.42,40.185

*do,i,1,maxm
		ERmode(i) = ABS(Amode(i)/Emode(i))
		moden(i) = i
*enddo

save,table_1
finish

/com,------------------------------------------------------------------------------------

/com,
/com,================
/com,	Spectrum Solve
/com,================
/com,

/solution
antype,spectr					! Perform Spectrum Analysis
spopt,mprs,maxm					! Multi Point Response Spectrum

gval = 386.0

/com,
/com, Support Group 1, Spectrum 1X
/com,******************************

id = 1
spunit, id,accg, gval

spfrq,id, 0.2,0.5,0.5263,0.7018,0.7752,1.0582,1.105
spval,id,,  0.16,0.16,0.195,0.235,0.339,0.339,0.305

spfrq,id, 1.25,1.3889,1.5221,1.7241,1.9231,2.0,2.1978
spval,id,,  0.305,0.395,0.395,0.525,0.525,0.555,0.555

spfrq,id, 2.2472,2.9851,3.3333,5.0,5.7143,7.6923,9.0909
spval,id,,  0.65,0.65,1.36,1.36,0.45,0.935,0.935

spfrq,id, 9.5238,12.8205,13.8889,17.8571,19.6078,27.027,33.3333
spval,id,,  0.995,0.995,1.0,1.0,1.222,1.222,0.5

spfrq,id, 50.0,100.0
spval,id,,  0.252,0.252

/com,
/com, spectrum 1Y (Group 1)
/com,***********************

id = 2
spunit, id,accg, gval

spfrq,id, 0.2,0.5,0.6061,0.6086,0.7752,1.5504,1.6667
spval,id,,  8.0e-2,8.0e-2,0.115,0.115,0.141,0.255,0.255

spfrq,id, 1.8349,2.0,2.2727,2.381,2.9762,3.4722,3.9216
spval,id,,  0.265,0.34,0.34,0.36,0.36,0.452,0.452

spfrq,id, 3.9841,5.4054,5.5556,6.3694,7.8125,10.5263,11.236
spval,id,,  0.5,0.5,0.4,0.4,1.4,1.4,1.0

spfrq,id, 11.7647,12.987,14.7059,20.0,22.2222,23.809,26.3158
spval,id,,  1.0,0.625,0.875,0.875,0.6,0.6,0.415

spfrq,id, 28.5714,30.303,33.3333,50.0,100.0
spval,id,,  0.415,0.295,0.295,0.165,0.165

/com,
/com, spectrum 1Z (Group 1)
/com,***********************

id = 3
spunit, id,accg, gval

spfrq,id, 0.2,0.5,0.5263,0.9524,1.0417,1.5601,1.5873
spval,id,,  0.15,0.15,0.167,0.24,0.305,0.305,0.28

spfrq,id, 1.7391,1.9048,2.1053,2.5974,3.3333,5.0,5.2632
spval,id,,  0.435,0.435,0.496,0.496,1.15,1.15,0.64

spfrq,id, 5.7143,5.8824,6.2893,6.5789,7.4074,9.6154,11.3636
spval,id,,  0.64,0.7,0.7,0.875,1.05,1.05,0.62

spfrq,id, 12.8205,14.0845,15.873,17.2414,25.0,27.027,32.2581
spval,id,,  0.62,0.755,0.65,1.15,1.15,1.1,0.5

spfrq,id, 50.0,100.0
spval,id,,  0.225,0.225

/com,-----------------------------------------------------------------------------------

/com,
/com, Support Group 2, Spectrum 2X
/com,******************************

id = 4
spunit, id,accg, gval

spfrq,id, 0.2,0.5,0.5714,0.9091,0.9524,1.25,1.7544
spval,id,,  0.15,0.15,0.22,0.25,0.31,0.31,0.47

spfrq,id, 2.3256,3.2258,4.5455,5.1282,5.5556,7.6923,10.0
spval,id,,  0.47,0.39,0.35,0.29,0.35,0.35,0.23

spfrq,id, 12.5,16.6667,19.2308,33.3333,100.0
spval,id,,  0.3,0.3,0.25,0.09,0.09

/com,
/com, spectrum 2Y (Group 2)
/com,***********************

id = 5
spunit, id,accg, gval

spfrq,id, 0.2,0.5,0.6667,3.7037,4.3478,4.5455,5.5556
spval,id,,  0.085,0.085,0.125,0.525,0.525,0.47,0.47

spfrq,id, 8.3333,10.989,13.3333,16.667,17.2414,21.2766,22.2222
spval,id,,  2.6,2.6,0.5,0.5,0.76,0.76,0.85

spfrq,id, 27.7778,29.4118,100.0
spval,id,,  0.85,0.194,0.194

/com,
/com, spectrum 2Z (Group 2)
/com,***********************

id = 6
spunit, id,accg, gval

spfrq,id, 0.2,0.5,0.5714,0.9091,0.9524,1.25,1.7544
spval,id,,  0.15,0.15,0.22,0.25,0.31,0.31,0.47

spfrq,id, 2.3256,3.2258,4.5455,5.1282,5.5556,7.6923,10.0
spval,id,,  0.47,0.39,0.35,0.29,0.35,0.35,0.23

spfrq,id, 12.5,16.6667,19.2308,33.3333,100.0
spval,id,,  0.3,0.3,0.25,0.09,0.09

/com,-----------------------------------------------------------------------------------

/com,
/com, Support Group 3, Spectrum 3X
/com,******************************

id = 7
spunit, id,accg, gval

spfrq,id, 0.2,0.5,0.578,1.7241,2.9412,3.0303,4.1667
spval,id,,  0.16,0.16,0.23,0.52,0.50,0.73,0.73

spfrq,id, 4.7619,5.4054,8.3333,10.5263,14.2857,17.8571,23.8095
spval,id,,  0.28,0.34,0.32,0.8,0.8,0.3,0.3

spfrq,id, 25.0,31.25,38.4615,100.0
spval,id,,  0.27,0.27,0.12,0.11

/com,
/com, spectrum 3Y (Group 3)
/com,***********************

id = 8
spunit, id,accg, gval

spfrq,id, 0.2,0.5,0.5814,1.25,1.4286,1.9231,2.3256
spval,id,,  0.08,0.08,0.11,0.19,0.20,0.35,0.35

spfrq,id, 2.439,3.3898,4.0,5.4054,5.8824,6.25,8.3333
spval,id,,  0.40,0.42,0.52,0.52,0.40,0.43,0.43

spfrq,id, 12.5,16.6667,23.2558,100.0
spval,id,,  0.47,0.14,0.14,0.12

/com,
/com, spectrum 3Z (Group 3)
/com,***********************

id = 9
spunit, id,accg, gval

spfrq,id, 0.2,0.5,0.578,1.7241,2.9412,3.0303,4.1667
spval,id,,  0.16,0.16,0.23,0.52,0.50,0.73,0.73

spfrq,id, 4.7619,5.4054,8.3333,10.5263,14.2857,17.8571,23.8095
spval,id,,  0.28,0.34,0.32,0.8,0.8,0.3,0.3

spfrq,id, 25.0,31.25,38.4615,100.0
spval,id,,  0.27,0.27,0.12,0.11

/com,-----------------------------------------------------------------------------------

/com,
/com, Support Group 4, Spectrum 4X
/com,******************************

id = 10
spunit, id,accg, gval

spfrq,id, 0.2,0.5,0.578,1.25,1.7241,2.2222,2.9412
spval,id,,  0.16,0.16,0.23,0.32,0.55,0.55,0.81

spfrq,id, 3.125,4.1667,5.1282,7.6923,10.4167,14.0845,16.9492
spval,id,,  1.50,1.50,0.29,0.3,1.31,1.31,0.46

spfrq,id, 23.8095,26.3158,32.2581,38.4615,100.0
spval,id,,  0.46,0.30,0.30,0.17,0.16

/com,
/com, spectrum 4Y (Group 4)
/com,***********************

id = 11
spunit, id,accg, gval

spfrq,id, 0.2,0.5,0.5848,1.5625,1.9231,2.3256,2.439
spval,id,,  0.08,0.08,0.11,0.20,0.36,0.36,0.40

spfrq,id, 3.0303,3.4483,4.0,5.3476,5.7143,6.25,8.0
spval,id,,  0.43,0.43,0.54,0.54,0.45,0.52,0.52

spfrq,id, 9.0909,12.5,18.1818,100.0
spval,id,,  0.9,0.9,0.18,0.14

/com,
/com, spectrum 4Z (Group 4)
/com,***********************

id = 12
spunit, id,accg, gval

spfrq,id, 0.2,0.5,0.578,1.25,1.7241,2.2222,2.9412
spval,id,,  0.16,0.16,0.23,0.32,0.55,0.55,0.81

spfrq,id, 3.125,4.1667,5.1282,7.6923,10.4167,14.0845,14.4928
spval,id,,  1.5,1.5,0.29,0.3,1.31,1.31,0.46

spfrq,id, 23.8095,26.3158,32.2581,38.4615,100.0
spval,id,,  0.46,0.3,0.3,0.17,0.16

/com,-----------------------------------------------------------------------------------

/com,
/com, Nodal Components for Excitation Points
/com,****************************************

allsel,all,all

nsel,,node,,2,4
nsel,a,node,,18
cm,group1,node

allsel

nsel,,node,,30
nsel,a,node,,38
nsel,a,node,,109
nsel,a,node,,113
nsel,a,node,,118
nsel,a,node,,120
nsel,a,node,,128
nsel,a,node,,134
cm,group2,node

allsel

nsel,,node,,44
nsel,a,node,,50
nsel,a,node,,52
nsel,a,node,,57
nsel,a,node,,136
nsel,a,node,,142
nsel,a,node,,146
cm,group3,node

allsel

nsel,,node,,63
nsel,a,node,,68
nsel,a,node,,73
nsel,a,node,,75
nsel,a,node,,88
nsel,a,node,,90
nsel,a,node,,95,97
nsel,a,node,,150
nsel,a,node,,158
nsel,a,node,,166
nsel,a,node,,170
nsel,a,node,,177
nsel,a,node,,193,195
cm,group4,node

allsel,all,all
/com,-----------------------------------------------------------------------------------

! -- Support Group 1 - spectrum 1 (Along X - Direction)
sed,1,,,group1
pfact,1
sed,0,,,group1

! -- Support Group 1 - spectrum 2 (Along Y - Direction)
sed,,1,,group1
pfact,2
sed,,0,,group1

! -- Support Group 1 - spectrum 3 (Along Z - Direction)
sed,,,1,group1
pfact,3
sed,,,0,group1

! -- Support Group 2 - spectrum 4 (Along X - Direction)
sed,1,,,group2
pfact,4
sed,0,,,group2

! -- Support Group 2 - spectrum 5 (Along Y - Direction)
sed,,1,,group2
pfact,5
sed,,0,,group2

! -- Support Group 2 - spectrum 6 (Along Z - Direction)
sed,,,1,group2
pfact,6
sed,,,0,group2

! -- Support Group 3 - spectrum 7 (Along X - Direction)
sed,1,,,group3
pfact,7
sed,0,,,group3

! -- Support Group 3 - spectrum 8 (Along Y - Direction)
sed,,1,,group3
pfact,8
sed,,0,,group3

! -- Support Group 3 - spectrum 9 (Along Z - Direction)
sed,,,1,group3
pfact,9
sed,,,0,group3

! -- Support Group 4 - spectrum 10 (Along X - Direction)
sed,1,,,group4
pfact,10
sed,0,,,group4

! -- Support Group 4 - spectrum 11 (Along Y - Direction)
sed,,1,,group4
pfact,11
sed,,0,,group4

! -- Support Group 4 - spectrum 12 (Along Z - Direction)
sed,,,1,group4
pfact,12
sed,,,0,group4

! *****************************************************
srss,0.00010,,yes			! activate Absolute Sum

solve

finish

/com,-----------------------------------------------------------------------------------

/post1

/input,,mcom

/com,-----------------------------------

/com, *Labels*
*dim,label2,char,1,6
*dim,label3,char,6,1
*dim,label4,char,6,1
*dim,label5,char,22,1

/com,-------------------------

label2(1,1) = 'ux_182'
label2(1,2) = 'uy_155'
label2(1,3) = 'uz_143'
label2(1,4) ='rotx_143'
label2(1,5) ='roty_149'
label2(1,6) ='rotz_155'

/com,-----------------------

label3(1,1)='PX(I)'
label3(2,1)='VY(I)'
label3(3,1)='VZ(I)'
label3(4,1)='TX(I)'
label3(5,1)='MY(I)'
label3(6,1)='MZ(I)'

/com,-----------------------

label4(1,1)='PX(J)'
label4(2,1)='VY(J)'
label4(3,1)='VZ(J)'
label4(4,1)='TX(J)'
label4(5,1)='MY(J)'
label4(6,1)='MZ(J)'

/com,-----------------------------------

/com,------------------------------------------------------------------------------------

/com,
/com,========================================================
/com, Maximum nodal displacements and rotations comparsion
/com,========================================================
/com,

/com, Solution obtained from Mechanical APDL
/com, ****************************

*GET,AdisX,NODE,182,U,X
*GET,AdisY,NODE,155,U,Y
*GET,AdisZ,NODE,143,U,Z
*GET,ArotX,NODE,143,ROT,X
*GET,ArotY,NODE,149,ROT,Y
*GET,ArotZ,NODE,155,ROT,Z

/com,
/com, Expected results from NRC manual
/com, *********************************

*SET,EdisX,6.88420e-01
*SET,EdisY,2.59046e-01
*SET,EdisZ,6.24744e-01
*SET,ErotX,5.30052e-03
*SET,ErotY,7.86745e-03
*SET,ErotZ,2.81817e-03

/com,
/com, Error computation
/com,********************

ERdisX=ABS(AdisX/EdisX)
ERdisY=ABS(AdisY/EdisY)
ERdisZ=ABS(AdisZ/EdisZ)
ERrotX=ABS((ArotX)/(ErotX))
ERrotY=ABS((ArotY)/(ErotY))
ERrotZ=ABS((ArotZ)/(ErotZ))

*dim,value,,6,3

*vfill,value(1,1),data,EdisX
*vfill,value(1,2),data,AdisX
*vfill,value(1,3),data,ERdisX

*vfill,value(2,1),data,EdisY
*vfill,value(2,2),data,AdisY
*vfill,value(2,3),data,ERdisY

*vfill,value(3,1),data,EdisZ
*vfill,value(3,2),data,AdisZ
*vfill,value(3,3),data,ERdisZ

*vfill,value(4,1),data,ErotX
*vfill,value(4,2),data,ArotX
*vfill,value(4,3),data,ERrotX

*vfill,value(5,1),data,ErotY
*vfill,value(5,2),data,ArotY
*vfill,value(5,3),data,ERrotY

*vfill,value(6,1),data,ErotZ
*vfill,value(6,2),data,ArotZ
*vfill,value(6,3),data,ERrotZ

save,table_2

/com,------------------------------------------------------------------------------------

/com,
/com,==============================
/com, Reaction forces comparision
/com,==============================
/com,

*dim,Areac,,36
*dim,Ereac,,36
*dim,ERreac,,36
*dim,Nreac,STRING,8,36

Nreac(1,1) = 'FX1'
Nreac(1,2) = 'FY1'
Nreac(1,3) = 'FZ1'
Nreac(1,4) = 'FY17'
Nreac(1,5) = 'FY29'

Nreac(1,6) = 'FZ37'
Nreac(1,7) = 'FX43'
Nreac(1,8) = 'FY49'
Nreac(1,9) = 'FZ51'
Nreac(1,10) = 'FX56'

Nreac(1,11) = 'FY62'
Nreac(1,12) = 'FZ67'
Nreac(1,13) = 'FY72'
Nreac(1,14) = 'FZ74'
Nreac(1,15) = 'FY87'

Nreac(1,16) = 'FY89'
Nreac(1,17) = 'FX94'
Nreac(1,18) = 'FY94'
Nreac(1,19) = 'FZ94'
Nreac(1,20) = 'FY108'

Nreac(1,21) = 'FX112'
Nreac(1,22) = 'FZ117'
Nreac(1,23) = 'FY119'
Nreac(1,24) = 'FZ127'
Nreac(1,25) = 'FY133'

Nreac(1,26) = 'FZ135'
Nreac(1,27) = 'FX141'
Nreac(1,28) = 'FZ145'
Nreac(1,29) = 'FY149'
Nreac(1,30) = 'FY157'

Nreac(1,31) = 'FX165'
Nreac(1,32) = 'FY169'
Nreac(1,33) = 'FY188'
Nreac(1,34) = 'FX192'
Nreac(1,35) = 'FY192'
Nreac(1,36) = 'FZ192'

*GET,Areac(1),NODE,2,RF,FX
*GET,Areac(2),NODE,3,RF,FY
*GET,Areac(3),NODE,4,RF,FZ
*GET,Areac(4),NODE,18,RF,FY
*GET,Areac(5),NODE,30,RF,FY

*GET,Areac(6),NODE,38,RF,FZ
*GET,Areac(7),NODE,44,RF,FX
*GET,Areac(8),NODE,50,RF,FY
*GET,Areac(9),NODE,52,RF,FX
*GET,Areac(10),NODE,57,RF,FX

*GET,Areac(11),NODE,63,RF,FY
*GET,Areac(12),NODE,68,RF,FX
*GET,Areac(13),NODE,73,RF,FY
*GET,Areac(14),NODE,75,RF,FX
*GET,Areac(15),NODE,88,RF,FY

*GET,Areac(16),NODE,90,RF,FY
*GET,Areac(17),NODE,95,RF,FX
*GET,Areac(18),NODE,96,RF,FY
*GET,Areac(19),NODE,97,RF,FZ
*GET,Areac(20),NODE,109,RF,FY

*GET,Areac(21),NODE,113,RF,FX
*GET,Areac(22),NODE,118,RF,FX
*GET,Areac(23),NODE,120,RF,FY
*GET,Areac(24),NODE,128,RF,FX
*GET,Areac(25),NODE,134,RF,FY

*GET,Areac(26),NODE,136,RF,FX
*GET,Areac(27),NODE,142,RF,FX
*GET,Areac(28),NODE,146,RF,FZ
*GET,Areac(29),NODE,150,RF,FY
*GET,Areac(30),NODE,158,RF,FY

*GET,Areac(31),NODE,166,RF,FX
*GET,Areac(32),NODE,170,RF,FY
*GET,Areac(33),NODE,177,RF,FY
*GET,Areac(34),NODE,193,RF,FX
*GET,Areac(35),NODE,194,RF,FY
*GET,Areac(36),NODE,195,RF,FZ

*VFILL,Ereac,DATA,3033,2119,1917,34,2018,3482,4132.177,2970,2882.485,1739.497
*VFILL,Ereac(11),DATA,47,6205.159,2469,6490.198,97,4444,2944,4206,823,51
*VFILL,Ereac(21),DATA,1887,1752.225,914,1258.628,703,626.592,1363.724,2031,1182,86
*VFILL,Ereac(31),DATA,3972.166,1058,665,834,431,2296

*do,i,1,36
   ERreac(i) = abs(Areac(i)/Ereac(i))
*enddo

save,table_4

/com,------------------------------------------------------------------------------------

/com,========================================================
/com, Element Forces and Moments Comparison
/com,========================================================

/com, Solution obtained from Mechanical APDL
/com,******************************

*dim,elem_res_I,,1,6
*dim,elem_res_J,,1,6

*dim,pxi,,1
*dim,vyi,,1
*dim,vzi,,1
*dim,txi,,1
*dim,myi,,1
*dim,mzi,,1

*dim,pxj,,1
*dim,vyj,,1
*dim,vzj,,1
*dim,txj,,1
*dim,myj,,1
*dim,mzj,,1

esel,s,ename,,16
esel,a,ename,,18

/com,==========
/com,	 Node I
/com,==========

/com, Element #1
/com,************

*get,pxi(1,1),elem,1,smisc,1
*get,vyi(1,1),elem,1,smisc,2
*get,vzi(1,1),elem,1,smisc,3
*get,txi(1,1),elem,1,smisc,4
*get,myi(1,1),elem,1,smisc,5
*get,mzi(1,1),elem,1,smisc,6

*vfill,elem_res_I(1,1),data,pxi(1,1)
*vfill,elem_res_I(1,2),data,vyi(1,1)
*vfill,elem_res_I(1,3),data,vzi(1,1)
*vfill,elem_res_I(1,4),data,txi(1,1)
*vfill,elem_res_I(1,5),data,myi(1,1)
*vfill,elem_res_I(1,6),data,mzi(1,1)

/com,==========
/com,  Node J
/com,==========

/com, Element #1
/com,************

*get,pxj(1,1),elem,1,smisc,7
*get,vyj(1,1),elem,1,smisc,8
*get,vzj(1,1),elem,1,smisc,9
*get,txj(1,1),elem,1,smisc,10
*get,myj(1,1),elem,1,smisc,11
*get,mzj(1,1),elem,1,smisc,12

*vfill,elem_res_J(1,1),data,pxj(1,1)
*vfill,elem_res_J(1,2),data,vyj(1,1)
*vfill,elem_res_J(1,3),data,vzj(1,1)
*vfill,elem_res_J(1,4),data,txj(1,1)
*vfill,elem_res_J(1,5),data,myj(1,1)
*vfill,elem_res_J(1,6),data,mzj(1,1)

/com,----------------------------------------------------------------------------

/com, Results from NRC benchmarks
/com, ***************************

*dim,exp_I,,1,6
*dim,exp_J,,1,6

/com, Element #1
/com,************

*vfill,exp_I(1,1),data,2.021e+03
*vfill,exp_I(1,2),data,3.016e+03
*vfill,exp_I(1,3),data,2.045e+03
*vfill,exp_I(1,4),data,8.226e+04
*vfill,exp_I(1,5),data,2.007e+05
*vfill,exp_I(1,6),data,2.902e+05

*vfill,exp_J(1,1),data,2.021e+03
*vfill,exp_J(1,2),data,3.016e+03
*vfill,exp_J(1,3),data,2.045e+03
*vfill,exp_J(1,4),data,8.226e+04
*vfill,exp_J(1,5),data,1.721e+05
*vfill,exp_J(1,6),data,2.418e+05

/com,---------------------------------------------------------------------------

/com, Error computation
/com, *********************

*dim,elem_error_I,,1,6
*dim,elem_error_J,,1,6
*dim,elem_tab,,12,3

/com,============
/com,   Node I
/com,============

i = 1
	*do,j,1,6
		*vfill,elem_error_I(i,j),data,abs(elem_res_I(i,j)/exp_I(i,j))
	*enddo

/com,============
/com,   Node J
/com,============

i = 1
	*do,j,1,6
		*vfill,elem_error_J(i,j),data,abs(elem_res_J(i,j)/exp_J(i,j))
	*enddo

/com,--------------------------------------------------------------------------

i = 1
	cs=(i-1)*6
	*do,j,1,6
		n=cs+j
		*vfill,elem_tab(n,1),data,exp_I(i,j)
		*vfill,elem_tab(n,2),data,elem_res_I(i,j)
		*vfill,elem_tab(n,3),data,elem_error_I(i,j)
	*enddo

	*do,j,1,6
		m=cs+j+6
		*vfill,elem_tab(m,1),data,exp_J(i,j)
		*vfill,elem_tab(m,2),data,elem_res_J(i,j)
		*vfill,elem_tab(m,3),data,elem_error_J(i,j)
	*enddo

save,table_3

/com,------------------------------------------------------------------------------------

/com,------------------------------------------------------------------------------------
/com,

/out,

/com,
/com, ---------------------vm-nr1677-2-4c-a Results Verification----------------------------
/com,

/nopr
resume,table_1
/gopr

/out,vm-nr1677-2-4c-a,vrt

/com,
/com, ===========================================
/com,  COMPARISON OF MODAL FREQUENCY
/com,      WITH EXPECTED RESULTS
/com, ===========================================
/com,

/com,	Mode | Expected | Mechanical APDL |  Ratio
/com,

*VWRITE,moden(1),Emode(1),Amode(1),ERmode(1)
(1X,F3.0,2X,F8.4,3X,F8.4,3X,F4.2,' ')

/com,

/com,------------------------------------------------------------------------------------
/com,

/nopr
resume,table_2
/gopr

/com,
/com,====================================================
/com,  COMPARISON OF NODAL DISPLACEMENTS AND ROTATIONS
/com,		       WITH EXPECTED RESULTS
/com,====================================================
/com,

/com,		Result_Node | Expected | Mechanical APDL |  Ratio
/com,

*vwrite,label2(1,1),value(1,1),value(1,2),value(1,3)
(1x,a8,'  ',f10.4,'  ',f10.4,'   ',f5.3)
*vwrite,label2(1,2),value(2,1),value(2,2),value(2,3)
(1x,a8,'  ',f10.4,'  ',f10.4,'   ',f5.3)
*vwrite,label2(1,3),value(3,1),value(3,2),value(3,3)
(1x,a8,'  ',f10.4,'  ',f10.4,'   ',f5.3)
*vwrite,label2(1,4),value(4,1),value(4,2),value(4,3)
(1x,a8,'  ',f10.4,'  ',f10.4,'   ',f5.3)
*vwrite,label2(1,5),value(5,1),value(5,2),value(5,3)
(1x,a8,'  ',f10.4,'  ',f10.4,'   ',f5.3)
*vwrite,label2(1,6),value(6,1),value(6,2),value(6,3)
(1x,a8,'  ',f10.4,'  ',f10.4,'   ',f5.3)

/com,

/com,-------------------------------------------------------------------------
/com,

/nopr
resume,table_4
/gopr

/com,
/com, ================================
/com,  COMPARISON OF REACTIONS FORCES
/com, ================================
/com,

/com,	       Node  | Expected  | Mechanical APDL  |  Ratio
/com,

*VWRITE,Nreac(1),Ereac(1),Areac(1),ERreac(1)
(5X,a,1X,F12.4,1X,F12.4,1X,F12.4,' ')

/com,

/com,--------------------------------------------------------------------------
/com,

/nopr
resume,table_3
/gopr

/com,
/com,===============================================
/com,  COMPARISON OF ELEMENT FORCES AND MOMENTS
/com,		     WITH EXPECTED RESULTS
/com,===============================================
/com,

/com,--------------------------------------------------------
/com,	Note: Element Forces and Moments for some elements
/com,       along Y & Z directions are flipped between Mechanical APDL
/com,		and NRC results
/com,--------------------------------------------------------

/com,		Result | Expected | Mechanical APDL |  Ratio
/com,

/com,===============
/com,   Element 1
/com,===============
/com,

*vwrite,label3(1,1),elem_tab(1,1),elem_tab(1,2),elem_tab(1,3)
(1x,a8,'   ',f12.4,'  ',f12.4,'   ',f5.3)

/com,

*vwrite,label4(1,1),elem_tab(7,1),elem_tab(7,2),elem_tab(7,3)
(1x,a8,'   ',f12.4,'  ',f12.4,'   ',f5.3)

/com,

/com,---------------------------------------------------------------------------------------
/com,

/out,
*list,vm-nr1677-2-4c-a,vrt
finish
/exit,nosave
