! Copyright (C) 2016 - 2024 ANSYS, Inc. and/or its affiliates.
! SPDX-License-Identifier: MIT
!
! MIT License
!
! Copyright (c) 2024 ANSYS, Inc. All rights reserved.
!
! Permission is hereby granted, free of charge, to any person obtaining a copy
! of this software and associated documentation files (the "Software"), to deal
! in the Software without restriction, including without limitation the rights
! to use, copy, modify, merge, publish, distribute, sublicense, and/or sell
! copies of the Software, and to permit persons to whom the Software is
! furnished to do so, subject to the following conditions:
!
! The above copyright notice and this permission notice shall be included in all
! copies or substantial portions of the Software.
!
! THE SOFTWARE IS PROVIDED "AS IS", WITHOUT WARRANTY OF ANY KIND, EXPRESS OR
! IMPLIED, INCLUDING BUT NOT LIMITED TO THE WARRANTIES OF MERCHANTABILITY,
! FITNESS FOR A PARTICULAR PURPOSE AND NONINFRINGEMENT. IN NO EVENT SHALL THE
! AUTHORS OR COPYRIGHT HOLDERS BE LIABLE FOR ANY CLAIM, DAMAGES OR OTHER
! LIABILITY, WHETHER IN AN ACTION OF CONTRACT, TORT OR OTHERWISE, ARISING FROM,
! OUT OF OR IN CONNECTION WITH THE SOFTWARE OR THE USE OR OTHER DEALINGS IN THE
! SOFTWARE.

/COM,ANSYS MEDIA REL. 2023R2 (05/12/2023) REF. VERIF. MANUAL: REL. 2023R2
/VERIFY,VM10
/PREP7
MP,PRXY,,0.3
/TITLE, VM10, BENDING OF A TEE SHAPED BEAM
C***    MECHANICS OF SOLIDS, CRANDALL AND DAHL, 1959, PAGE 294, EX. 7.2
ANTYPE,STATIC
ET,1,BEAM188,,,3
SECT,1,BEAM,T
SECD,9,20,4,1.5
MP,EX,1,30E6
N,1
N,2,100
N,3,,1
E,1,2,3
D,1,ALL
F,2,MZ,100000
D,ALL,UZ,,,,,ROTX,ROTY
FINISH
/SOLU
NSUBST,1
OUTPR,ALL,1
SOLVE
FINISH
/POST1
ETABLE,STRS_B,LS,1
ETABLE,STRS_T,LS,31
*GET,STRSS_B,ELEM,1,ETAB,STRS_B
*GET,STRSS_T,ELEM,1,ETAB,STRS_T
*DIM,LABEL,CHAR,2,2
*DIM,VALUE,,2,3
LABEL(1,1) = 'STRSS,(B','STRSS,(T'
LABEL(1,2) = 'OT) psi ','OP) psi '
*VFILL,VALUE(1,1),DATA,300,-700
*VFILL,VALUE(1,2),DATA,STRSS_B,STRSS_T
*VFILL,VALUE(1,3),DATA,ABS(STRSS_B/300) ,ABS(STRSS_T/700 )
/COM
/OUT,vm10,vrt
/COM,------------------- VM10 RESULTS COMPARISON ---------------------
/COM,
/COM,                 |   TARGET   |   Mechanical APDL   |   RATIO
/COM,
*VWRITE,LABEL(1,1),LABEL(1,2),VALUE(1,1),VALUE(1,2),VALUE(1,3)
(1X,A8,A8,'   ',F10.0,'  ',F10.0,'   ',1F5.3)
/COM,-----------------------------------------------------------------
/OUT

FINISH
*LIST,vm10,vrt
