! Copyright (C) 2016 - 2024 ANSYS, Inc. and/or its affiliates.
! SPDX-License-Identifier: MIT
!
! MIT License
!
! Copyright (c) 2024 ANSYS, Inc. All rights reserved.
!
! Permission is hereby granted, free of charge, to any person obtaining a copy
! of this software and associated documentation files (the "Software"), to deal
! in the Software without restriction, including without limitation the rights
! to use, copy, modify, merge, publish, distribute, sublicense, and/or sell
! copies of the Software, and to permit persons to whom the Software is
! furnished to do so, subject to the following conditions:
!
! The above copyright notice and this permission notice shall be included in all
! copies or substantial portions of the Software.
!
! THE SOFTWARE IS PROVIDED "AS IS", WITHOUT WARRANTY OF ANY KIND, EXPRESS OR
! IMPLIED, INCLUDING BUT NOT LIMITED TO THE WARRANTIES OF MERCHANTABILITY,
! FITNESS FOR A PARTICULAR PURPOSE AND NONINFRINGEMENT. IN NO EVENT SHALL THE
! AUTHORS OR COPYRIGHT HOLDERS BE LIABLE FOR ANY CLAIM, DAMAGES OR OTHER
! LIABILITY, WHETHER IN AN ACTION OF CONTRACT, TORT OR OTHERWISE, ARISING FROM,
! OUT OF OR IN CONNECTION WITH THE SOFTWARE OR THE USE OR OTHER DEALINGS IN THE
! SOFTWARE.

/COM,ANSYS MEDIA REL. 2023R2 (05/12/2023) REF. VERIF. MANUAL: REL. 2023R2
/VERIFY,VM113
/PREP7
smrt,off
/TITLE, VM113, TRANSIENT TEMP. DISTRIBUTION IN AN ORTHOTROPIC METAL BAR
C***    CONDUCTION HEAT TRANSFER, SCHNEIDER, 2ND. PRINTING, PAGE 261, EX. 10-7
ANTYPE,TRANS
ET,1,PLANE55               ! THERMAL SOLID
MP,KXX,1,20                ! ORTHOTROPIC CONDUCTIVITIES
MP,KYY,1,3.6036
MP,DENS,1,400
MP,C,1,.009009
K,1                        ! USE SOLID MODEL
K,2,(2/12)
KGEN,2,1,2,1,,(1/12)
L,1,2
*REPEAT,2,2,2
LESIZE,ALL,,,6,(1/3)
L,1,3
*REPEAT,2,1,1
LESIZE,3,,,5,(1/3)
LESIZE,4,,,5,(1/3)
A,1,3,4,2
AMESH,1
TIME,(3/3600)
NSUBST,40
AUTOTS,ON                  ! USE AUTOMATIC TIME STEPPING
OUTPR,,LAST
BFUNIF,TEMP,500
KBC,1                      ! STEP BOUNDARY CONDITIONS
NSEL,S,LOC,X,(2/12)
NSEL,A,LOC,Y,(1/12)
SF,ALL,CONV,240,100        ! CONVECTION SURFACE
NSEL,ALL
FINISH
/SOLU
EQSLV,JCG                  ! USE JACOBI CONJUGATE GRADIENT SOLVER
/OUT,SCRATCH
SOLVE
FINISH
/POST1
NSEL,S,LOC,X
NSEL,A,LOC,X,(2/12)        ! SELECT NODES OF INTEREST
NSEL,U,LOC,Y,.01,(.99/12)
/OUT,
PRNSOL,TEMP                ! PRINT NODAL TEMPERATURES
*get,tn1,node,1,temp
*get,tn7,node,7,temp
*get,tn13,node,13,temp
*get,tn2,node,2,temp
*dim,label,char,4,2
*dim,value,,4,3
label(1,1) = 'T,F (nod','T,F (nod','T,F (nod','T,F (nod'
label(1,2) = 'e  1)   ','e  7)   ','e 13)   ','e  2)   '
*vfill,value(1,1),data,459,151,279,202
*vfill,value(1,2),data,tn1,tn7,tn13,tn2
*vfill,value(1,3),data,abs(tn1/459),abs(tn7/151),abs(tn13/279),abs(tn2/202)
/com

/OUT,vm113,vrt
/com,-------------------(VM113)RESULTS COMPARISON---------------
/com,
/com,                 |   TARGET   |   Mechanical APDL   |   RATIO
/com,
*vwrite,label(1,1),label(1,2),value(1,1),value(1,2),value(1,3)
(1x,a8,a8,'   ',f10.0,'  ',f12.0,'   ',1f15.2)
/com,----------------------------------------------------------
/OUT
FINISH
*LIST,vm113,vrt
