! Copyright (C) 2024 ANSYS, Inc. and/or its affiliates.
! SPDX-License-Identifier: MIT
!
!
! Permission is hereby granted, free of charge, to any person obtaining a copy
! of this software and associated documentation files (the "Software"), to deal
! in the Software without restriction, including without limitation the rights
! to use, copy, modify, merge, publish, distribute, sublicense, and/or sell
! copies of the Software, and to permit persons to whom the Software is
! furnished to do so, subject to the following conditions:
!
! The above copyright notice and this permission notice shall be included in all
! copies or substantial portions of the Software.
!
! THE SOFTWARE IS PROVIDED "AS IS", WITHOUT WARRANTY OF ANY KIND, EXPRESS OR
! IMPLIED, INCLUDING BUT NOT LIMITED TO THE WARRANTIES OF MERCHANTABILITY,
! FITNESS FOR A PARTICULAR PURPOSE AND NONINFRINGEMENT. IN NO EVENT SHALL THE
! AUTHORS OR COPYRIGHT HOLDERS BE LIABLE FOR ANY CLAIM, DAMAGES OR OTHER
! LIABILITY, WHETHER IN AN ACTION OF CONTRACT, TORT OR OTHERWISE, ARISING FROM,
! OUT OF OR IN CONNECTION WITH THE SOFTWARE OR THE USE OR OTHER DEALINGS IN THE
! SOFTWARE.

/COM,ANSYS MEDIA REL. 2023R2 (05/12/2023) REF. VERIF. MANUAL: REL. 2023R2
/VERIFY,VM131
/PREP7
/TITLE, VM131, ACCELERATION OF A ROTATING CRANE BOOM
C***    VECTOR MECHANICS FOR ENGINEERS, BEER & JOHNSTON, P 616, PROB. 15.13
ANTYPE,STATIC
ET,1,MASS21,,,2      ! GENERALIZED MASS WITHOUT ROTARY INERTIA
R,1,1                ! UNIT MASS
N,1,34.64,20
E,1
OMEGA,,,.5           ! ANGULAR VELOCITY OF RISING BOOM WRT GLOBAL
CGOMGA,,.3           ! ANGULAR VELOCITY OF CAB WRT REFERENCE SYSTEM
D,1,ALL
OUTRES,,1
OUTPR,RSOL,1
OUTPR,NLOAD,1
FINISH
/out,scratch
/SOLU
SOLVE
NSEL,S,NODE,,1,1
FINI
/out
/POST1
FSUM
*GET,AX,FSUM,,ITEM,FX
*GET,AY,FSUM,,ITEM,FY
*GET,AZ,FSUM,,ITEM,FZ
*status,parm
*DIM,LABEL,CHAR,3,2
*DIM,VALUE,,3,3
LABEL(1,1) = 'AX ','AY ','AZ '
LABEL(1,2) = 'ft/s/s','ft/s/s','ft/s/s'
*VFILL,VALUE(1,1),DATA,-11.78,-5,6
*VFILL,VALUE(1,2),DATA,(-1)*(AX),(-1)*(AY),(-1)*(AZ)
*VFILL,VALUE(1,3),DATA,ABS((-1)*AX/11.78),ABS((-1)*AY/5),ABS((-1)*AZ/6)
/COM
/OUT,vm131,vrt
/COM,------------------- VM131 RESULTS COMPARISON -------------
/COM,
/COM,                 |   TARGET   |   Mechanical APDL   |   RATIO
/COM,
*VWRITE,LABEL(1,1),LABEL(1,2),VALUE(1,1),VALUE(1,2),VALUE(1,3)
(1X,A8,A8,'   ',F10.2,'  ',F12.2,'   ',1F15.2)
/COM,----------------------------------------------------------
/OUT
FINISH
*LIST,vm131,vrt
