! Copyright (C) 2016 - 2024 ANSYS, Inc. and/or its affiliates.
! SPDX-License-Identifier: MIT
!
! MIT License
!
! Copyright (c) 2024 ANSYS, Inc. All rights reserved.
!
! Permission is hereby granted, free of charge, to any person obtaining a copy
! of this software and associated documentation files (the "Software"), to deal
! in the Software without restriction, including without limitation the rights
! to use, copy, modify, merge, publish, distribute, sublicense, and/or sell
! copies of the Software, and to permit persons to whom the Software is
! furnished to do so, subject to the following conditions:
!
! The above copyright notice and this permission notice shall be included in all
! copies or substantial portions of the Software.
!
! THE SOFTWARE IS PROVIDED "AS IS", WITHOUT WARRANTY OF ANY KIND, EXPRESS OR
! IMPLIED, INCLUDING BUT NOT LIMITED TO THE WARRANTIES OF MERCHANTABILITY,
! FITNESS FOR A PARTICULAR PURPOSE AND NONINFRINGEMENT. IN NO EVENT SHALL THE
! AUTHORS OR COPYRIGHT HOLDERS BE LIABLE FOR ANY CLAIM, DAMAGES OR OTHER
! LIABILITY, WHETHER IN AN ACTION OF CONTRACT, TORT OR OTHERWISE, ARISING FROM,
! OUT OF OR IN CONNECTION WITH THE SOFTWARE OR THE USE OR OTHER DEALINGS IN THE
! SOFTWARE.

/COM,ANSYS MEDIA REL. 2023R2 (05/12/2023) REF. VERIF. MANUAL: REL. 2023R2
/VERIFY,VM162
/PREP7
/TITLE, VM162, CIRCULAR COOLING FIN OF RECTANGULAR PROFILE
C***     CONDUCTION HEAT TRANSFER, SCHNEIDER, 2ND. PRINTING, PAGE 82, ART. 4-10
ANTYPE,STATIC
ET,1,SOLID90
MP,KXX,1,15
CSYS,1
N,1,.04167
N,9,.0625
FILL
NGEN,3,10,1,9,1,,2.5
NGEN,3,30,1,29,1,,,.002604
E,1,3,23,21,61,63,83,81
EMORE,2,13,22,11,62,73,82,71
EMORE,31,33,53,51
EGEN,4,2,1
OUTPR,,1
D,1,TEMP,100,,81,10
NSEL,S,LOC,Z
SF,ALL,CONV,100,0.0
NSEL,S,LOC,Z,0.005208
SF,ALL,CONV,100,0.0
NSEL,S,LOC,X,0.0625
SF,ALL,CONV,100,0.0
NSEL,ALL
FINISH
/SOLU
/OUT,SCRATHC
SOLVE
FINISH
/POST1
SET,LAST
/OUT,
*GET,T,NODE,29,TEMP
FSUM,HEAT
*GET,Q1,FSUM,0,ITEM,HEAT
*SET,Q,ABS((Q1*360/5))
*DIM,LABEL,CHAR,2,2
*DIM,VALUE,,2,3
LABEL(1,1) = 'T2 ','q '
LABEL(1,2) = 'F','BTU/hr'
*VFILL,VALUE(1,1),DATA,53.22,102.05
*VFILL,VALUE(1,2),DATA,T,Q
*VFILL,VALUE(1,3),DATA,ABS(T/53.22),ABS(Q/102.05)
/COM
/OUT,vm162,vrt
/COM,------------------- VM162 RESULTS COMPARISON -------------
/COM,
/COM,                 |   TARGET   |   Mechanical APDL   |   RATIO
/COM,
*VWRITE,LABEL(1,1),LABEL(1,2),VALUE(1,1),VALUE(1,2),VALUE(1,3)
(1X,A8,A8,'   ',F10.2,'  ',F13.2,'   ',1F15.3)
/COM,----------------------------------------------------------
/OUT
FINISH
*LIST,vm162,vrt
