! Copyright (C) 2016 - 2024 ANSYS, Inc. and/or its affiliates.
! SPDX-License-Identifier: MIT
!
! MIT License
!
! Copyright (c) 2024 ANSYS, Inc. All rights reserved.
!
! Permission is hereby granted, free of charge, to any person obtaining a copy
! of this software and associated documentation files (the "Software"), to deal
! in the Software without restriction, including without limitation the rights
! to use, copy, modify, merge, publish, distribute, sublicense, and/or sell
! copies of the Software, and to permit persons to whom the Software is
! furnished to do so, subject to the following conditions:
!
! The above copyright notice and this permission notice shall be included in all
! copies or substantial portions of the Software.
!
! THE SOFTWARE IS PROVIDED "AS IS", WITHOUT WARRANTY OF ANY KIND, EXPRESS OR
! IMPLIED, INCLUDING BUT NOT LIMITED TO THE WARRANTIES OF MERCHANTABILITY,
! FITNESS FOR A PARTICULAR PURPOSE AND NONINFRINGEMENT. IN NO EVENT SHALL THE
! AUTHORS OR COPYRIGHT HOLDERS BE LIABLE FOR ANY CLAIM, DAMAGES OR OTHER
! LIABILITY, WHETHER IN AN ACTION OF CONTRACT, TORT OR OTHERWISE, ARISING FROM,
! OUT OF OR IN CONNECTION WITH THE SOFTWARE OR THE USE OR OTHER DEALINGS IN THE
! SOFTWARE.

/COM,ANSYS MEDIA REL. 2023R2 (05/12/2023) REF. VERIF. MANUAL: REL. 2023R2
/VERIFY,VM211
JPGPRF,500,100,1             ! MACRO TO SET PREFS FOR JPEG PLOTS
/SHOW,JPEG
R = 200                        ! RADIUS OF CYLINDER (mm)
/PREP7
SMRT,OFF
/TITLE, VM211, RUBBER CYLINDER PRESSED BETWEEN TWO PLATES
/COM    REF: T. SUSSMAN, K.J. BATHE, "A FE FORMULATION FOR NONLINEAR ..."
/COM         COMPUTERS & STRUCTURES, VOL. 26, NOS. 1/2, 1987
ET,1,PLANE182, , ,2            ! 2-D PLANE-STRAIN 4-NODE STRUCTURAL SOLID
KEYOPT,1,6,1                   ! Mixed U-P FORMULATION
ET,2,TARGE169                  ! 2-D TARGET ELEMENT
ET,3,CONTA172                  ! 2-D 3-NODE CONTACT ELEMENT WITH DROPPED MIDSIDE NODES
KEYOPT,3,5,4
KEYOPT,3,10,0
C10 = 0.293
C01 = 0.177
NU1 = 0.49967
DD  = (1-2*NU1)/(C10+C01)
TB,HYPER,1,1,2,MOONEY
TBDATA,1,C10,C01,DD
CSYS,1                         ! SWITCH TO CYLINDRICAL C.S.
K,1                            ! DEFINE KEYPOINTS
K,2,R,-90
K,3,R
K,4,(0.5*R),-90
K,5,(0.6*R),-45
K,6,(0.5*R)
K,7,R,-45
L,2,7
L,7,3
CSYS,0                         ! SWITCH TO CARTESIAN C.S.
A,2,7,5,4
A,7,3,6,5
A,4,5,6,1
TSHAPE,LINE
K,1001,-2*R,-R
K,1002,2*R,-R
L,1002,1001
SAVE,temp,db                    ! SAVE MODEL FOR SECOND ANALYSIS
TYPE,1
AMESH,ALL                         ! MESH ALL AREAS
REAL,2
TYPE,2
LMESH,10
LSEL,S,LINE,,1,2,1
TYPE,3
LMESH,ALL
save,plane182,db
FINI

*CREATE,SOLV2D,MAC             ! MACRO TO SOLVE MODEL
/SOLU
ANTYPE,STATIC
NSEL,S,LOC,X
D,ALL,UX
NSEL,S,LOC,Y
CP,1,UY,ALL
*GET,NCEN,NODE,,NUM,MIN
ALLSEL
NLGEOM,ON                     ! INCLUDE LARGE DEFORMATION EFFECTS
NSUBST,20,1000,10             ! SPECIFY NUMBER OF SUBSTEPS IN LOAD STEP
OUTRES,,1                     ! WRITE SOLUTION FOR EVERY SUBSTEP
D,NCEN,UY,-100                ! APPLY DISPLACEMENT UY = -100 TO COUPLED NODES
SOLVE
FINISH
*END
/OUT,SCRATCH
SOLV2D                         ! USE MACRO SOLVE2D
/OUT,
*CREATE,PLOTS,MAC              ! MACRO FOR POST-PROCESSING
/POST1
/DSCALE,1,1
PLDISP,1                      ! PLOT DISPLACED SHAPE
FINISH
/POST26
/AXLAB,Y,FORCE
/AXLAB,X,DISPLACEMENT
NSOL,2,NCEN,U,Y
RFORCE,3,NCEN,F,Y
PROD,2,2,,,,,,-2
PROD,3,3,,,,,,-2
XVAR,2
PLVAR,3                       ! PLOT DISPLACEMENT VS FORCE
PRVAR,2,3                     ! PRINT DISPLACEMENT, FORCE
*GET,F1,VARI,3,RTIME,.5
*GET,F2,VARI,3,RTIME,1
*DIM,LABEL,CHAR,2,2
*DIM,VALUE,,2,3
 LABEL(1,1) = 'F (N) @ ','F (N) @ '
LABEL(1,2) = '.1','.2'
*VFILL,VALUE(1,1),DATA,250,1400
*VFILL,VALUE(1,2),DATA,F1,F2
*VFILL,VALUE(1,3),DATA,ABS(F1/250),ABS(F2/1400)
FINISH
*END

PLOTS                          ! USE MACRO PLOTS
SAVE,TABLE_1

RESUME,temp,db
/PREP7
ALLSEL
ET,1,PLANE183, , ,2            ! 2-D PLANE-STRAIN 8-NODE STRUCTURAL SOLID
KEYOPT,1,6,1                   ! Mixed U-P FORMULATION
ET,2,TARGE169                  ! 2-D TARGET ELEMENT
ET,3,CONTA172                  ! 2-D 3-NODE CONTACT ELEMENT
KEYOPT,3,5,4
KEYOPT,3,10,0
TYPE,1
AMESH,ALL
REAL,2
TYPE,2
LMESH,10
LSEL,S,LINE,,1,2,1
TYPE,3
LMESH,ALL
save,plane183,db
FINISH
/OUT,SCRATCH
SOLV2D                         ! USE MACRO TO OBTAIN SOLUTION
PLOTS                          ! USE MACRO TO POSTPROCESS
/OUT,
SAVE,TABLE_2
fini
/clear,nostart
/PREP7
RESUME,temp,db
ET,5,SOLID185                  ! 3-D 8-NODE STRUCTURAL SOLID
KEYOPT,5,6,1                   ! Mixed U-P FORMULATION
ET,2,TARGE170
ET,3,CONTA174                  ! 3-D 8 NODE CONTACT ELEMENT WITH DROPPED MIDSIDE NODES
KEYOPT,3,10,0
KEYOPT,3,5,4
ET,4,200,6                     ! 2-D 4 NODED MESH200
LDELETE,10,,,1
ALLSEL
CSYS,0
K,1001,-.1*R,-R,-.1*R
K,1002,2*R,-R,-.1*R
K,1003,2*R,-R,8*R
K,1004,-.1*R,-R,8*R
A,1004,1003,1002,1001
TSHAPE,TRI
SAVE,temp3d,db
ESIZE,,1
REAL,2
TYPE,2
AMESH,4
REAL,1
TYPE,4
ESIZE,,4
AMESH,1,3,1
TYPE,1
ESIZE,,4
VEXT,1,3,1,,,1
CSYS,1
ASEL,S,LOC,X,R
TYPE,3
REAL,2
AMESH,ALL
LSEL,ALL
NSEL,ALL
CSYS,0
save,solid185,db
FINISH

*CREATE,SOLV3D,MAC            ! MACRO TO SOLVE MODEL
/SOLUTION
ANTYPE,STATIC
D,ALL,UZ                      ! CONSTRAIN ALL IN Z (PLANE STRAIN)
NSEL,S,LOC,X
D,ALL,UX
NSEL,S,LOC,Y
CP,1,UY,ALL
*GET,NCEN,NODE,,NUM,MIN
NSEL,ALL
NLGEOM,ON                     ! INCLUDE LARGE DEFORMATION EFFECTS
NSUBST,20,1000,10             ! SPECIFY NUMBER OF SUBSTEPS IN LOAD STEP
OUTRES,,1                     ! WRITE SOLUTION FOR EVERY SUBSTEP
D,NCEN,UY,-100                ! APPLY DISPLACEMENT UY = -100 TO COUPLED NODES
SOLVE
FINISH
*END
/OUT,SCRATCH
SOLV3D                         ! USE MACRO TO OBTAIN SOLUTION
/OUT,
PLOTS                          ! USE MACRO TO POSTPROCESS
SAVE,TABLE_3

/PREP7
RESUME,temp3d,db
ET,1,SOLID186                  ! 3-D 20-NODE STRUCTURAL SOLID
KEYOPT,1,6,1                   ! Mixed U-P FORMULATION
ET,2,TARGE170
ET,3,CONTA174                  ! 3-D 8-NODE CONTACT ELEMENT
KEYOPT,3,10,0
KEYOPT,3,5,4
KEYOPT,3,7,1
VEXT,1,3,1,,,1
TYPE,1
VMESH,ALL
REAL,2
TYPE,3
CSYS,1
ASEL,S,LOC,X,R
AMESH,ALL
ESIZE,,1
TYPE,2
ASEL,ALL
AMESH,4
ALLSEL
CSYS,0
save,solid186,db
FINI
/OUT,SCRATCH
SOLV3D
/OUT,
PLOTS
SAVE,TABLE_4

!* THE INPUT BELOW IS SAME AS INPUT ABOVE BUT WITH K(2)=3 OF CONTAC171-174 ELEMENTS...
RESUME,plane182,db
/PREP7
KEYOPT,3,4,2                   ! ON NODAL POINT - NORMAL TO TARGET SURFACE
KEYOPT,3,2,3                   ! LAGRANGE MULTIPLIER ON CONTACT NORMAL AND PENALTY ON TANGENT
FINISH
/OUT,SCRATCH
SOLV2D                         ! USE MACRO TO OBTAIN SOLUTION
/OUT,
PLOTS                          ! USE MACRO TO POSTPROCESS
SAVE,TABLE_5

RESUME,plane183,db
/PREP7
KEYOPT,3,4,2                   ! ON NODAL POINT - NORMAL TO TARGET SURFACE
KEYOPT,3,2,3                   ! LAGRANGE MULTIPLIER ON CONTACT NORMAL AND PENALTY ON TANGENT
FINISH
/OUT,SCRATCH
SOLV2D                         ! USE MACRO TO OBTAIN SOLUTION
/OUT,
PLOTS                          ! USE MACRO TO POSTPROCESS
SAVE,TABLE_6

RESUME,solid185,db
/PREP7
KEYOPT,3,4,2                   ! ON NODAL POINT - NORMAL TO TARGET SURFACE
KEYOPT,3,2,3                   ! LAGRANGE MULTIPLIER ON CONTACT NORMAL AND PENALTY ON TANGENT
FINISH
/OUT,SCRATCH
SOLV3D                         ! USE MACRO TO OBTAIN SOLUTION
/OUT,
PLOTS                          ! USE MACRO TO POSTPROCESS
SAVE,TABLE_7

RESUME,solid186,db
/PREP7
KEYOPT,3,4,2                   ! ON NODAL POINT - NORMAL TO TARGET SURFACE
KEYOPT,3,2,3                   ! LAGRANGE MULTIPLIER ON CONTACT NORMAL AND PENALTY ON TANGENT
FINISH
/OUT,SCRATCH
SOLV3D
/OUT,
PLOTS
SAVE,TABLE_8

!* THE INPUT BELOW IS SAME AS INPUT ABOVE BUT WITH K(6)=3 OF CONTAC171-174 ELEMENTS...
RESUME,plane182,db
/PREP7
KEYOPT,3,6,3                   ! USE AN EXPONENTIAL PRESSURE-PENETRATION RELATIONSHIP
FINISH
/OUT,SCRATCH
SOLV2D                         ! USE MACRO TO OBTAIN SOLUTION
/OUT,
PLOTS                          ! USE MACRO TO POSTPROCESS
SAVE,TABLE_9

RESUME,plane183,db
/PREP7
KEYOPT,3,6,3                   ! USE AN EXPONENTIAL PRESSURE-PENETRATION RELATIONSHIP
FINISH
/OUT,SCRATCH
SOLV2D                         ! USE MACRO TO OBTAIN SOLUTION
/OUT,
PLOTS                          ! USE MACRO TO POSTPROCESS
SAVE,TABLE_10

RESUME,solid185,db
/PREP7
KEYOPT,3,6,3                   ! USE AN EXPONENTIAL PRESSURE-PENETRATION RELATIONSHIP
FINISH
/OUT,SCRATCH
SOLV3D                         ! USE MACRO TO OBTAIN SOLUTION
/OUT,
PLOTS                          ! USE MACRO TO POSTPROCESS
SAVE,TABLE_11

RESUME,solid186,db
/PREP7
KEYOPT,3,6,3                   ! USE AN EXPONENTIAL PRESSURE-PENETRATION RELATIONSHIP
FINISH
/OUT,SCRATCH
SOLV3D
/OUT,
PLOTS
SAVE,TABLE_12

/COM
/OUT,vm211,vrt
RESUME,TABLE_1
/COM,------------------- VM211 RESULTS COMPARISON --------------
/COM,
/COM,                 |   TARGET   |   Mechanical APDL   |   RATIO
/COM,
/COM,PLANE182:
*VWRITE,LABEL(1,1),LABEL(1,2),VALUE(1,1),VALUE(1,2),VALUE(1,3)
(1X,A8,A8,'   ',F10.2,'  ',F14.2,'   ',1F15.3)
/NOPR
RESUME,TABLE_2
/GOPR
/COM,
/COM,PLANE183:
*VWRITE,LABEL(1,1),LABEL(1,2),VALUE(1,1),VALUE(1,2),VALUE(1,3)
(1X,A8,A8,'   ',F10.2,'  ',F14.2,'   ',1F15.3)
/NOPR
RESUME,TABLE_3
/GOPR
/COM,
/COM,SOLID185:
*VWRITE,LABEL(1,1),LABEL(1,2),VALUE(1,1),VALUE(1,2),VALUE(1,3)
(1X,A8,A8,'   ',F10.2,'  ',F14.2,'   ',1F15.3)
/NOPR
RESUME,TABLE_4
/GOPR
/COM,
/COM,SOLID186:
*VWRITE,LABEL(1,1),LABEL(1,2),VALUE(1,1),VALUE(1,2),VALUE(1,3)
(1X,A8,A8,'   ',F10.2,'  ',F14.2,'   ',1F15.3)
/NOPR
RESUME,TABLE_5
/GOPR
/COM,
/COM,PLANE182 WITH KEYOPT(2)=3 OF CONTAC172(DROPPED MIDSIDE NODES):
*VWRITE,LABEL(1,1),LABEL(1,2),VALUE(1,1),VALUE(1,2),VALUE(1,3)
(1X,A8,A8,'   ',F10.2,'  ',F14.2,'   ',1F15.3)
/NOPR
RESUME,TABLE_6
/GOPR
/COM,
/COM,PLANE183 WITH KEYOPT(2)=3 OF CONTAC172:
*VWRITE,LABEL(1,1),LABEL(1,2),VALUE(1,1),VALUE(1,2),VALUE(1,3)
(1X,A8,A8,'   ',F10.2,'  ',F14.2,'   ',1F15.3)
/NOPR
RESUME,TABLE_7
/GOPR
/COM,
/COM,SOLID185 WITH KEYOPT(2)=3 OF CONTAC174(DROPPED MIDSIDE NODES):
*VWRITE,LABEL(1,1),LABEL(1,2),VALUE(1,1),VALUE(1,2),VALUE(1,3)
(1X,A8,A8,'   ',F10.2,'  ',F14.2,'   ',1F15.3)
/NOPR
RESUME,TABLE_8
/GOPR
/COM,
/COM,SOLID186 WITH KEYOPT(2)=3 OF CONTAC174:
*VWRITE,LABEL(1,1),LABEL(1,2),VALUE(1,1),VALUE(1,2),VALUE(1,3)
(1X,A8,A8,'   ',F10.2,'  ',F14.2,'   ',1F15.3)
/NOPR
RESUME,TABLE_9
/GOPR
/COM,
/COM,PLANE182 WITH KEYOPT(6)=3 OF CONTAC172(DROPPED MIDSIDE NODES):
*VWRITE,LABEL(1,1),LABEL(1,2),VALUE(1,1),VALUE(1,2),VALUE(1,3)
(1X,A8,A8,'   ',F10.2,'  ',F14.2,'   ',1F15.3)
/NOPR
RESUME,TABLE_10
/GOPR
/COM,
/COM,PLANE183 WITH KEYOPT(6)=3 OF CONTAC172:
*VWRITE,LABEL(1,1),LABEL(1,2),VALUE(1,1),VALUE(1,2),VALUE(1,3)
(1X,A8,A8,'   ',F10.2,'  ',F14.2,'   ',1F15.3)
/NOPR
RESUME,TABLE_11
/GOPR
/COM,
/COM,SOLID185 WITH KEYOPT(6)=3 OF CONTAC174(DROPPED MIDSIDE NODES):
*VWRITE,LABEL(1,1),LABEL(1,2),VALUE(1,1),VALUE(1,2),VALUE(1,3)
(1X,A8,A8,'   ',F10.2,'  ',F14.2,'   ',1F15.3)
/NOPR
RESUME,TABLE_12
/GOPR
/COM,
/COM,SOLID186 WITH KEYOPT(6)=3 OF CONTAC174:
*VWRITE,LABEL(1,1),LABEL(1,2),VALUE(1,1),VALUE(1,2),VALUE(1,3)
(1X,A8,A8,'   ',F10.2,'  ',F14.2,'   ',1F15.3)
/COM,-----------------------------------------------------------
/COM,
/OUT
FINISH
*LIST,vm211,vrt
/DELETE,PLOTS,MAC
/DELETE,SOLV2D,MAC
/DELETE,SOLV3D,MAC
/DELETE,TABLE_1
/DELETE,TABLE_2
/DELETE,TABLE_3
/DELETE,TABLE_4
/DELETE,TABLE_5
/DELETE,TABLE_6
/DELETE,TABLE_7
/DELETE,TABLE_8
/DELETE,TABLE_9
/DELETE,TABLE_10
/DELETE,TABLE_11
/DELETE,TABLE_12
/DELETE,temp,db
/DELETE,temp3d,db
/DELETE,plane182,db
/DELETE,plane183,db
/DELETE,solid185,db
/DELETE,solid186,db
