! Copyright (C) 2016 - 2024 ANSYS, Inc. and/or its affiliates.
! SPDX-License-Identifier: MIT
!
! MIT License
!
! Copyright (c) 2024 ANSYS, Inc. All rights reserved.
!
! Permission is hereby granted, free of charge, to any person obtaining a copy
! of this software and associated documentation files (the "Software"), to deal
! in the Software without restriction, including without limitation the rights
! to use, copy, modify, merge, publish, distribute, sublicense, and/or sell
! copies of the Software, and to permit persons to whom the Software is
! furnished to do so, subject to the following conditions:
!
! The above copyright notice and this permission notice shall be included in all
! copies or substantial portions of the Software.
!
! THE SOFTWARE IS PROVIDED "AS IS", WITHOUT WARRANTY OF ANY KIND, EXPRESS OR
! IMPLIED, INCLUDING BUT NOT LIMITED TO THE WARRANTIES OF MERCHANTABILITY,
! FITNESS FOR A PARTICULAR PURPOSE AND NONINFRINGEMENT. IN NO EVENT SHALL THE
! AUTHORS OR COPYRIGHT HOLDERS BE LIABLE FOR ANY CLAIM, DAMAGES OR OTHER
! LIABILITY, WHETHER IN AN ACTION OF CONTRACT, TORT OR OTHERWISE, ARISING FROM,
! OUT OF OR IN CONNECTION WITH THE SOFTWARE OR THE USE OR OTHER DEALINGS IN THE
! SOFTWARE.

/COM,ANSYS MEDIA REL. 2023R2 (05/12/2023) REF. VERIF. MANUAL: REL. 2023R2
/VERIFY,VM244
/TITLE,VM244, MODAL ANALYSIS OF CYCLIC SYMMETRIC ANNULAR PLATES
C*** ROBERT D BLEVINS,"FORMULAS FOR NATURAL FREQUENCY AND MODE
C*** SHAPE", NEW YORK, NY, VAN NOSTRAND REINHOLD PUBLISHING INC
C*** 1979, PP. 246-247, 286-287
_THETA1 = 0	        ! DEGREE, STARTING ANGLE FOR SECTION
_THETA2 = 30		! DEGREE, ENDING ANGLE FOR SECTION
_FLOWER = 23.381	! HZ, LOWER FREQUENCY LIMIT PER BLEVINS
_FREQDIF = 2.1		! PERCENT
_A = 500		    ! OUTSIDE RADIUS (MM)
_B = 185		    ! INSIDE RADIUS (MM)
_H = 5			    ! THICKNESS (MM)
_E = 70000		    ! YOUNGS (N/MM^2)
_V = 0.3		    ! POISON'S RATIO
_D = 2.7E-9		    ! DENSITY AL1100 H14 (NSEC^2/MM^4)
*DIM,VALUE,ARRAY,6,3
*DIM,LABEL,CHAR,6
LABEL(1)='SOLID185'
LABEL(2)='SOLID186'
LABEL(3)='SOLID187'
LABEL(4)='SHELL181'
LABEL(5)='SHELL281'
LABEL(6)='SOLSH190'
/OUT,SCRATCH
*DO,I,1,6,1
*IF,LABEL(I),EQ,'SHELL181',OR,LABEL(I),EQ,'SHELL281',THEN
C*** CYCSYM MODEL, SIMPLE SUPPORT OUTER EDGE, FREE INNER EDGE,
C*** SHELL ELEMENT
/PREP7
MP,EX,1,_E
MP,NUXY,1,_V
MP,DENS,1,_D
CYL4,0,0,_A,_THETA1,_B,_THETA2
SECTYPE,1,SHELL
SECDATA,_H,1,0,3
SECNUM,1
CYCLIC
ET,1,LABEL(I)
AMESH,ALL
CSYS,1
NSEL,S,LOC,X,_A
NROTAT,ALL
D,ALL,UY
D,ALL,UZ
NSEL,ALL
FINISH
*ELSE
C*** CYCSYM MODEL, SIMPLE SUPPORT OUTER EDGE, FREE INNER EDGE
C*** SOLID ELEMENTS
/PREP7
MP,EX,1,_E
MP,NUXY,1,_V
MP,DENS,1,_D
CYL4,0,0,_A,_THETA1,_B,_THETA2,_H
CYCLIC
ET,1,LABEL(I)
*IF,LABEL(I),EQ,'SOLID185',THEN
KEYOPT,1,2,3     ! REDUCE STIFFNESS FORMULATION TO MAKE FREQUENCIES MATCH
*ELSEIF,LABEL(I),EQ,'SOLSH190',THEN
VEORIENT,1,THIN
*ENDIF
VMESH,ALL
CSYS,1
NSEL,S,LOC,X,_A-.00001,_A+.00001
NSEL,R,LOC,Z,0
NROTAT,ALL
D,ALL,UY
D,ALL,UZ
NSEL,ALL
FINISH
*ENDIF
/SOLUTION
ANTYPE,2
MODOPT,LANB,3
MXPAND,3, , ,1
MODOPT,LANB,3,1,100000, ,OFF
CYCOPT,HINDEX,0,0
SOLVE
FINISH
/POST1
SET,LIST
*GET,F%I%,MODE,1,FREQ
/COM,                 FREQUENCY COMPARE FOR ELEMENT %LABEL(I)%
*IF,(ABS((F%I% - _FLOWER)/_FLOWER))*100,LT,_FREQDIF,THEN
C*** FREQUENCIES COMPARE WITHIN BLEVINS RESULT!!!
*ELSE
C*** FAILURE: FREQUENCIES OUT OF ACCAPTABLE LIMITS!!!
FINISH
/EXIT,NOSAVE           ! EXIT DUE TO FAILURE
*ENDIF
FINISH
/PREP7
CYCLIC,OFF
FINISH
PARSAV,ALL
/CLEAR,NOSTART
PARRES,
*ENDDO
/OUT,
*VFILL,VALUE(1,1),DATA,_FLOWER,_FLOWER,_FLOWER,_FLOWER,_FLOWER,_FLOWER
*VFILL,VALUE(1,2),DATA,F1,F2,F3,F4,F5,F6
*VFILL,VALUE(1,3),DATA,ABS(F1/_FLOWER),ABS(F2/_FLOWER),ABS(F3/_FLOWER),ABS(F4/_FLOWER),ABS(F5/_FLOWER),ABS(F6/_FLOWER)
/OUT,vm244,vrt
/COM,------------------- VM244 RESULTS COMPARISON -------------
/COM,
/COM,                 |    TARGET   |    Mechanical APDL   |    RATIO
/COM,
*VWRITE,LABEL(1),VALUE(1,1),VALUE(1,2),VALUE(1,3)
(1X,A10,'     ',E10.4,'    ',E14.4,'     ',1F15.3)
/COM,----------------------------------------------------------
/OUT
FINISH
*LIST,vm244,vrt
