! Copyright (C) 2016 - 2024 ANSYS, Inc. and/or its affiliates.
! SPDX-License-Identifier: MIT
!
! MIT License
!
! Copyright (c) 2024 ANSYS, Inc. All rights reserved.
!
! Permission is hereby granted, free of charge, to any person obtaining a copy
! of this software and associated documentation files (the "Software"), to deal
! in the Software without restriction, including without limitation the rights
! to use, copy, modify, merge, publish, distribute, sublicense, and/or sell
! copies of the Software, and to permit persons to whom the Software is
! furnished to do so, subject to the following conditions:
!
! The above copyright notice and this permission notice shall be included in all
! copies or substantial portions of the Software.
!
! THE SOFTWARE IS PROVIDED "AS IS", WITHOUT WARRANTY OF ANY KIND, EXPRESS OR
! IMPLIED, INCLUDING BUT NOT LIMITED TO THE WARRANTIES OF MERCHANTABILITY,
! FITNESS FOR A PARTICULAR PURPOSE AND NONINFRINGEMENT. IN NO EVENT SHALL THE
! AUTHORS OR COPYRIGHT HOLDERS BE LIABLE FOR ANY CLAIM, DAMAGES OR OTHER
! LIABILITY, WHETHER IN AN ACTION OF CONTRACT, TORT OR OTHERWISE, ARISING FROM,
! OUT OF OR IN CONNECTION WITH THE SOFTWARE OR THE USE OR OTHER DEALINGS IN THE
! SOFTWARE.

/COM,ANSYS MEDIA REL. 2023R2 (05/12/2023) REF. VERIF. MANUAL: REL. 2023R2
/VERIFY,VM248
/SHOW,JPEG
JPGPRF,500,100,1           !* MACRO TO SET PREFS FOR JPEG PLOTS
/TITLE, VM248, DELAMINATION OF DOUBLE CANTILEVER BEAM - 2D PLANE STRAIN
C*** USING INTER202
/COM,   REF: ALFANO, G. AND CRISFIELD, M. A.,
/COM,   "FINITE ELEMENT INTERFACE MODELS FOR THE DELAMINATION ANALYSIS
/COM,   OF LAMINATED COMPOSITES: MECHANICAL AND COMPUTATIONAL ISSUES"
/COM,   INT. J. NUMER. METH. ENGNG 2001, 50:1701-1736.
/PREP7
ET,1,PLANE182              !* 2D 4-NODE STRUCTURAL SOLID ELEMENT
KEYOPT,1,1,2               !* ENHANCE STRAIN FORMULATION
KEYOPT,1,3,2               !* PLANE STRAIN
ET,2,PLANE182
KEYOPT,2,1,2
KEYOPT,2,3,2
ET,3,INTER202              !* 2D 4-NODE COHESIVE ZONE ELEMENT
KEYOPT,3,3,2               !* PLANE STRAIN
MP,EX,4,1.353E5            !* E11 = 135.3 GPA
MP,EY,4,9.0E3              !* E22 =   9.0 GPA
MP,EZ,4,9.0E3              !* E33 =   9.0 GPA
MP,GXY,4,5.2E3             !* G12 =   5.2 GPA
MP,PRXY,4,0.24
MP,PRXZ,4,0.24
MP,PRYZ,4,0.46
GMAX = 0.004
TNMAX = 25                 !* TENSILE STRENGTH
TB,CZM,5,,,EXPO            !* COHESIVE ZONE MATERIAL
TBDATA,1,TNMAX,GMAX,1000.0
RECTNG,0,100,0,1.5         !* DEFINE AREAS
RECTNG,0,100,0,-1.5
LSEL,S,LINE,,2,8,2         !* DEFINE LINE DIVISION
LESIZE,ALL,0.75
LSEL,INVE
LESIZE,ALL, , ,200
ALLSEL,ALL
TYPE,1                     !* MESH AREA 2
MAT,4
LOCAL,11,0,0,0,0
ESYS,11
AMESH,2
CSYS,0
TYPE,2                     !* MESH AREA 1
ESYS,11
AMESH,1
CSYS,0
NSEL,S,LOC,X,30,100
NUMMRG,NODES
ESLN
TYPE,3
MAT,5
CZMESH,,,1,Y,0,            !* GENERATE INTERFACE ELEMENTS
ALLSEL,ALL
NSEL,S,LOC,X,100           !* APPLY CONSTRAINTS
D,ALL,ALL
NSEL,ALL
FINISH
/SOLU
ESEL,S,TYPE,,2
NSLE,S
NSEL,R,LOC,X
NSEL,R,LOC,Y,1.5           !* APPLY DISPLACEMENT LOADING ON TOP
D,ALL,UY,10
NSEL,ALL
ESEL,ALL
ESEL,S,TYPE,,1
NSLE,S
NSEL,R,LOC,X
NSEL,R,LOC,Y,-1.5          !* APPLY DISPLACEMENT LOADING ON BOTTOM
D,ALL,UY,-10
NSEL,ALL
ESEL,ALL
NLGEOM,ON
AUTOTS,ON
TIME,1
NSUBST,40,40,40
OUTRES,ALL,ALL
/OUT,SCRATCH
SOLVE                      !* PERFORM SOLUTION
FINISH
/POST26
NSEL,S,LOC,Y,1.5
NSEL,R,LOC,X,0
*GET,NTOP,NODE,0,NUM,MAX
NSEL,ALL
NSOL,2,NTOP,U,Y,UY
RFORCE,3,NTOP,F,Y,FY
PROD,4,3, , ,RF, , ,20
/TITLE,VM248, DCB: REACTION AT TOP NODE VERSES PRESCRIBED DISPLACEMENT
/AXLAB,X,DISP U (mm)
/AXLAB,Y,REACTION FORCE R (N)
/YRANGE,0,60
XVAR,2
PLVAR,4
PRVAR,UY,RF
*GET,TMAX,VARI,4,EXTREM,TMAX   !* TIME CORRESPONDING TO MAX RFORCE
FINISH
/POST1
SET, , , , ,TMAX               !* RETRIEVE RESULTS AT TMAX
NSEL,S,NODE, ,NTOP             !* SELECT NODE NTOP
/OUT,
*GET,RF_NTOP,NODE,NTOP,RF,FY   !* FY RFORCE AT NODE NTOP
*GET,UY_NTOP,NODE,NTOP,U,Y     !* DISP AT NODE NTOP CORRESPONDING TO RFORCE
RF_MAX = RF_NTOP*20            !* PLANE STRAIN OPTION AND WIDTH = 20 mm
SET,LAST                       !* RETRIEVE RESULTS AT LAST SUBSTEP
*GET,RF_END,NODE,NTOP,RF,FY    !* FY RFORCE AT NODE NTOP AT LAST SUBSTEP
*GET,UY_END,NODE,NTOP,U,Y      !* DISP AT NODE NTOP CORRESPONDING TO RFORCE
RF_END = RF_END*20             !* PLANE STRAIN OPTION AND WIDTH = 20 mm
*DIM,LABEL,CHAR,2,2
*DIM,VALUE,,2,3
*DIM,VALUE2,,2,3
LABEL(1,1) = 'RFORCE','DISP '
LABEL(1,2) = 'FY (N)','UY (mm)'
*VFILL,VALUE(1,1),DATA,60.0,1.0
*VFILL,VALUE(1,2),DATA,RF_MAX,UY_NTOP
*VFILL,VALUE(1,3),DATA,ABS(RF_MAX/60.0),ABS(UY_NTOP/1.0)
*VFILL,VALUE2(1,1),DATA,24,10.0
*VFILL,VALUE2(1,2),DATA,RF_END,UY_END
*VFILL,VALUE2(1,3),DATA,ABS(RF_END/24.0),ABS(UY_END/10.0)
SAVE,INF1
FINISH
/CLEAR,NOSTART
/OUT,SCRATCH


/TITLE, VM248, DELAMINATION OF DOUBLE CANTILEVER BEAM - 2D PLANE STRAIN
C*** USING INTER203
/PREP7
ET,1,PLANE183              !* 2D 8-NODE STRUCTURAL SOLID ELEMENT
KEYOPT,1,3,2               !* PLANE STRAIN
ET,2,PLANE183
KEYOPT,2,3,2
ET,3,INTER203              !* 2D 6-NODE COHESIVE ZONE ELEMENT
KEYOPT,3,3,2               !* PLANE STRAIN
MP,EX,4,1.353E5            !* E11 = 135.3 GPA
MP,EY,4,9.0E3              !* E22 =   9.0 GPA
MP,EZ,4,9.0E3              !* E33 =   9.0 GPA
MP,GXY,4,5.2E3             !* G12 =   5.2 GPA
MP,PRXY,4,0.24
MP,PRXZ,4,0.24
MP,PRYZ,4,0.46
GMAX = 0.004
TNMAX = 25                 !* TENSILE STRENGTH
TB,CZM,5,,,EXPO            !* COHESIVE ZONE MATERIAL
TBDATA,1,TNMAX,GMAX,1000.0
RECTNG,0,100,0,1.5         !* DEFINE AREAS
RECTNG,0,100,0,-1.5
LSEL,S,LINE,,2,8,2         !* DEFINE LINE DIVISION
LESIZE,ALL,1.5
LSEL,INVE
LESIZE,ALL, , ,200
ALLSEL,ALL
TYPE,1                     !* MESH AREA 2
MAT,4
LOCAL,11,0,0,0,0
ESYS,11
AMESH,2
CSYS,0
TYPE,2                     !* MESH AREA 1
ESYS,11
AMESH,1
CSYS,0
NSEL,S,LOC,X,30,100
NUMMRG,NODES
ESLN
TYPE,3
MAT,5
CZMESH,,,1,Y,0,            !* GENERATE INTERFACE ELEMENTS
ALLSEL,ALL
NSEL,S,LOC,X,100           !* APPLY CONSTRAINTS
D,ALL,ALL
NSEL,ALL
FINISH
/SOLU
ESEL,S,TYPE,,2
NSLE,S
NSEL,R,LOC,X
NSEL,R,LOC,Y,1.5           !* APPLY DISPLACEMENT LOADING ON TOP
D,ALL,UY,10
NSEL,ALL
ESEL,ALL
ESEL,S,TYPE,,1
NSLE,S
NSEL,R,LOC,X
NSEL,R,LOC,Y,-1.5          !* APPLY DISPLACEMENT LOADING ON BOTTOM
D,ALL,UY,-10
NSEL,ALL
ESEL,ALL
NLGEOM,ON
AUTOTS,ON
TIME,1
NSUBST,40,40,40
OUTRES,ALL,ALL
/OUT,SCRATCH
SOLVE                      !* PERFORM SOLUTION
FINISH
/POST26
NSEL,S,LOC,Y,1.5
NSEL,R,LOC,X,0
*GET,NTOP,NODE,0,NUM,MAX
NSEL,ALL
NSOL,2,NTOP,U,Y,UY
RFORCE,3,NTOP,F,Y,FY
PROD,4,3, , ,RF, , ,20
/TITLE,VM248, DCB: REACTION AT TOP NODE VERSES PRESCRIBED DISPLACEMENT
/AXLAB,X,DISP U (mm)
/AXLAB,Y,REACTION FORCE R (N)
/YRANGE,0,60
XVAR,2
PLVAR,4
PRVAR,UY,RF
*GET,TMAX,VARI,4,EXTREM,TMAX   !* TIME CORRESPONDING TO MAX RFORCE
FINISH
/POST1
SET, , , , ,TMAX               !* RETRIEVE RESULTS AT TMAX
NSEL,S,NODE, ,NTOP             !* SELECT NODE NTOP
/OUT,
*GET,RF_NTOP,NODE,NTOP,RF,FY   !* FY RFORCE AT NODE NTOP
*GET,UY_NTOP,NODE,NTOP,U,Y     !* DISP AT NODE NTOP CORRESPONDING TO RFORCE
RF_MAX = RF_NTOP*20            !* PLANE STRAIN OPTION AND WIDTH = 20 mm
SET,LAST                       !* RETRIEVE RESULTS AT LAST SUBSTEP
*GET,RF_END,NODE,NTOP,RF,FY    !* FY RFORCE AT NODE NTOP AT LAST SUBSTEP
*GET,UY_END,NODE,NTOP,U,Y      !* DISP AT NODE NTOP CORRESPONDING TO RFORCE
RF_END = RF_END*20             !* PLANE STRAIN OPTION AND WIDTH = 20 mm
*DIM,LABEL,CHAR,2,2
*DIM,VALUE,,2,3
*DIM,VALUE2,,2,3
LABEL(1,1) = 'RFORCE','DISP '
LABEL(1,2) = 'FY (N)','UY (mm)'
*VFILL,VALUE(1,1),DATA,60.0,1.0
*VFILL,VALUE(1,2),DATA,RF_MAX,UY_NTOP
*VFILL,VALUE(1,3),DATA,ABS(RF_MAX/60.0),ABS(UY_NTOP/1.0)
*VFILL,VALUE2(1,1),DATA,24,10.0
*VFILL,VALUE2(1,2),DATA,RF_END,UY_END
*VFILL,VALUE2(1,3),DATA,ABS(RF_END/24.0),ABS(UY_END/10.0)
SAVE,INF2
FINISH
/CLEAR,NOSTART
/OUT,SCRATCH


/TITLE, VM248, DELAMINATION OF DOUBLE CANTILEVER BEAM - 3D
C*** USING INTER205
/PREP7
ET,1,SOLID185	           !* 3D 8-NODE STRUCTURAL SOLID ELEMENT
KEYOPT,1,2,2               !* PLANE STRAIN
ET,2,SOLID185
KEYOPT,2,2,2
ET,3,INTER205              !* 3D 8-NODE COHESIVE ZONE ELEMENT
MP,EX,4,1.353E5            !* E11 = 135.3 GPA
MP,EY,4,9.0E3              !* E22 =   9.0 GPA
MP,EZ,4,9.0E3              !* E33 =   9.0 GPA
MP,GXY,4,5.2E3             !* G12 =   5.2 GPA
MP,GYZ,4,5.2E3
MP,GXZ,4,3.08E3
MP,PRXY,4,0.24
MP,PRXZ,4,0.24
MP,PRYZ,4,0.46
GMAX = 0.004
TNMAX = 25                 !* TENSILE STRENGTH
TB,CZM,5,,,EXPO            !* COHESIVE ZONE MATERIAL
TBDATA,1,TNMAX,GMAX,1000.0
BLC4,0,0,100,1.5,1         !* DEFINE VOLUMES
BLC4,0,0,100,-1.5,1
LSEL,S,LINE,,10,11,1       !* DEFINE LINE DIVISION
LSEL,A,LINE,,22,23,1
LESIZE,ALL,,,1
LSEL,S,LINE,,7,17,10
LESIZE,ALL,,,200
LSEL,S,LINE,,6,18,12
LESIZE,ALL,1.5
ALLSEL,ALL
TYPE,1                     !* MESH VOLUME 2
MAT,4
LOCAL,11,0,0,0,0
ESYS,11
VMESH,2
CSYS,0
TYPE,2                     !* MESH VOLUME 1
ESYS,11
VMESH,1
CSYS,0
NSEL,S,LOC,X,30,100
NUMMRG,NODES
ESLN
TYPE,3
MAT,5
CZMESH,,,1,Y,0,            !* GENERATE INTERFACE ELEMENTS
ALLSEL,ALL
NSEL,S,LOC,X,100           !* APPLY CONSTRAINTS
D,ALL,ALL
NSEL,ALL
D,ALL,UZ,0
FINISH
/SOLU
ESEL,S,TYPE,,2
NSLE,S
NSEL,R,LOC,X
NSEL,R,LOC,Y,1.5           !* APPLY DISPLACEMENT LOADING ON TOP
D,ALL,UY,10
NSEL,ALL
ESEL,ALL
ESEL,S,TYPE,,1
NSLE,S
NSEL,R,LOC,X
NSEL,R,LOC,Y,-1.5          !* APPLY DISPLACEMENT LOADING ON BOTTOM
D,ALL,UY,-10
NSEL,ALL
ESEL,ALL
NLGEOM,ON
AUTOTS,ON
TIME,1
NSUBST,40,40,40
OUTRES,ALL,ALL
/OUT,SCRATCH
SOLVE                      !* PERFORM SOLUTION
FINISH
/POST26
NSEL,S,LOC,Y,1.5
NSEL,R,LOC,X,0
NSEL,R,LOC,Z,0
*GET,NTOP,NODE,0,NUM,MAX
NSEL,ALL
NSOL,2,NTOP,U,Y,UY
RFORCE,3,NTOP,F,Y,FY
PROD,4,3, , ,RF, , ,20
/TITLE,VM248, DCB: REACTION AT TOP NODE VERSES PRESCRIBED DISPLACEMENT
/AXLAB,X,DISP U (mm)
/AXLAB,Y,REACTION FORCE R (N)
/YRANGE,0,60
XVAR,2
PLVAR,4
PRVAR,UY,RF
*GET,TMAX,VARI,4,EXTREM,TMAX   !* TIME CORRESPONDING TO MAX RFORCE
FINISH
/POST1
SET, , , , ,TMAX               !* RETRIEVE RESULTS AT TMAX
NSEL,S,NODE, ,NTOP             !* SELECT NODE NTOP
/OUT,
*GET,RF_NTOP,NODE,NTOP,RF,FY   !* FY RFORCE AT NODE NTOP
*GET,UY_NTOP,NODE,NTOP,U,Y     !* DISP AT NODE NTOP CORRESPONDING TO RFORCE
RF_MAX = RF_NTOP*40 	       !* PLANE STRAIN OPTION AND WIDTH = 20 mm
SET,LAST                       !* RETRIEVE RESULTS AT LAST SUBSTEP
*GET,RF_END,NODE,NTOP,RF,FY    !* FY RFORCE AT NODE NTOP AT LAST SUBSTEP
*GET,UY_END,NODE,NTOP,U,Y      !* DISP AT NODE NTOP CORRESPONDING TO RFORCE
RF_END = RF_END*40 	       !* PLANE STRAIN OPTION AND WIDTH = 20 mm
*DIM,LABEL,CHAR,2,2
*DIM,VALUE,,2,3
*DIM,VALUE2,,2,3
LABEL(1,1) = 'RFORCE','DISP '
LABEL(1,2) = 'FY (N)','UY (mm)'
*VFILL,VALUE(1,1),DATA,60.0,1.0
*VFILL,VALUE(1,2),DATA,RF_MAX,UY_NTOP
*VFILL,VALUE(1,3),DATA,ABS(RF_MAX/60.0),ABS(UY_NTOP/1.0)
*VFILL,VALUE2(1,1),DATA,24,10.0
*VFILL,VALUE2(1,2),DATA,RF_END,UY_END
*VFILL,VALUE2(1,3),DATA,ABS(RF_END/24.0),ABS(UY_END/10.0)
SAVE,INF3
FINISH
/CLEAR,NOSTART
/OUT,SCRATCH


/TITLE, VM248, DELAMINATION OF DOUBLE CANTILEVER BEAM - 2D PLANE STRAIN
C*** USING CONTA172 WITH DROPPED MIDSIDE NODES
/PREP7
ET,1,PLANE182              !* 2D 4-NODE STRUCTURAL SOLID ELEMENT
KEYOPT,1,1,2               !* ENHANCE STRAIN FORMULATION
KEYOPT,1,3,2               !* PLANE STRAIN
ET,2,PLANE182
KEYOPT,2,1,2
KEYOPT,2,3,2
! DEFINE CONTACT ELEMENTS
ET,3,CONTA172
ET,4,TARGE169
KEYOPT,3,12,2
MP,EX,4,1.353E5            !* E11 = 135.3 GPA
MP,EY,4,9.0E3              !* E22 =   9.0 GPA
MP,EZ,4,9.0E3              !* E33 =   9.0 GPA
MP,GXY,4,5.2E3             !* G12 =   5.2 GPA
MP,PRXY,4,0.24
MP,PRXZ,4,0.24
MP,PRYZ,4,0.46
GMAX = 0.004
TNMAX = 25                 !* TENSILE STRENGTH
TB,CZM,5,,,EXPO            !* COHESIVE ZONE MATERIAL
TBDATA,1,TNMAX,GMAX,1000.0
RECTNG,0,100,0,1.5         !* DEFINE AREAS
RECTNG,0,100,0,-1.5
LSEL,S,LINE,,2,8,2         !* DEFINE LINE DIVISION
LESIZE,ALL,0.75
LSEL,INVE
LESIZE,ALL, , ,200
ALLSEL,ALL
TYPE,1                     !* MESH AREA 2
MAT,4
LOCAL,11,0,0,0,0
ESYS,11
AMESH,2
CSYS,0
TYPE,2                     !* MESH AREA 1
ESYS,11
AMESH,1
CSYS,0
! GENERATE CONTACT ELEMENTS
ESEL,S,TYPE,,1
NSLE
NSEL,R,LOC,Y
NSEL,R,LOC,X,30,100
TYPE,3
REAL,3
MAT,5
ESURF
ALLSEL,ALL
ESEL,S,TYPE,,2,2
NSEL
NSEL,R,LOC,Y
NSEL,R,LOC,X,30,100
TYPE,4
REAL,3
MAT,5
ESURF
ALLSEL,ALL
NSEL,S,LOC,X,100           !* APPLY CONSTRAINTS
D,ALL,ALL
NSEL,ALL
FINISH
/SOLU
ESEL,S,TYPE,,2
NSLE,S
NSEL,R,LOC,X
NSEL,R,LOC,Y,1.5           !* APPLY DISPLACEMENT LOADING ON TOP
D,ALL,UY,10
NSEL,ALL
ESEL,ALL
ESEL,S,TYPE,,1
NSLE,S
NSEL,R,LOC,X
NSEL,R,LOC,Y,-1.5          !* APPLY DISPLACEMENT LOADING ON BOTTOM
D,ALL,UY,-10
NSEL,ALL
ESEL,ALL
NLGEOM,ON
AUTOTS,ON
TIME,1
NSUBST,40,40,40
OUTRES,ALL,ALL
/OUT,SCRATCH
SOLVE                      !* PERFORM SOLUTION
FINISH
/POST26
NSEL,S,LOC,Y,1.5
NSEL,R,LOC,X,0
*GET,NTOP,NODE,0,NUM,MAX
NSEL,ALL
NSOL,2,NTOP,U,Y,UY
RFORCE,3,NTOP,F,Y,FY
PROD,4,3, , ,RF, , ,20
/out,czm_con_182,out
prvar,2,4
/OUT,SCRATCH
/TITLE,VM248CON, DCB: REACTION AT TOP NODE VERSES PRESCRIBED DISPLACEMENT
/AXLAB,X,DISP U (mm)
/AXLAB,Y,REACTION FORCE R (N)
/YRANGE,0,60
XVAR,2
PLVAR,4
PRVAR,UY,RF
*GET,TMAX,VARI,4,EXTREM,TMAX   !* TIME CORRESPONDING TO MAX RFORCE
FINISH
/POST1
SET, , , , ,TMAX               !* RETRIEVE RESULTS AT TMAX
NSEL,S,NODE, ,NTOP             !* SELECT NODE NTOP
/OUT,
*GET,RF_NTOP,NODE,NTOP,RF,FY   !* FY RFORCE AT NODE NTOP
*GET,UY_NTOP,NODE,NTOP,U,Y     !* DISP AT NODE NTOP CORRESPONDING TO RFORCE
RF_MAX = RF_NTOP*20            !* PLANE STRAIN OPTION AND WIDTH = 20 mm
SET,LAST                       !* RETRIEVE RESULTS AT LAST SUBSTEP
*GET,RF_END,NODE,NTOP,RF,FY    !* FY RFORCE AT NODE NTOP AT LAST SUBSTEP
*GET,UY_END,NODE,NTOP,U,Y      !* DISP AT NODE NTOP CORRESPONDING TO RFORCE
RF_END = RF_END*20             !* PLANE STRAIN OPTION AND WIDTH = 20 mm
*DIM,LABEL,CHAR,2,2
*DIM,VALUE,,2,3
*DIM,VALUE2,,2,3
LABEL(1,1) = 'RFORCE','DISP '
LABEL(1,2) = 'FY (N)','UY (mm)'
*VFILL,VALUE(1,1),DATA,60.0,1.0
*VFILL,VALUE(1,2),DATA,RF_MAX,UY_NTOP
*VFILL,VALUE(1,3),DATA,ABS(RF_MAX/60.0),ABS(UY_NTOP/1.0)
*VFILL,VALUE2(1,1),DATA,24,10.0
*VFILL,VALUE2(1,2),DATA,RF_END,UY_END
*VFILL,VALUE2(1,3),DATA,ABS(RF_END/24.0),ABS(UY_END/10.0)
SAVE,INF4
FINISH
/CLEAR,NOSTART
/OUT,SCRATCH


/TITLE, VM248, DELAMINATION OF DOUBLE CANTILEVER BEAM - 2D PLANE STRAIN
C*** USING CONTA172
/PREP7
ET,1,PLANE183              !* 2D 8-NODE STRUCTURAL SOLID ELEMENT
KEYOPT,1,3,2               !* PLANE STRAIN
ET,2,PLANE183
KEYOPT,2,3,2
! DEFINE CONTACT ELEMENTS
ET,3,CONTA172
ET,4,TARGE169
KEYOPT,3,12,2
MP,EX,4,1.353E5            !* E11 = 135.3 GPA
MP,EY,4,9.0E3              !* E22 =   9.0 GPA
MP,EZ,4,9.0E3              !* E33 =   9.0 GPA
MP,GXY,4,5.2E3             !* G12 =   5.2 GPA
MP,PRXY,4,0.24
MP,PRXZ,4,0.24
MP,PRYZ,4,0.46
GMAX = 0.004
TNMAX = 25                 !* TENSILE STRENGTH
TB,CZM,5,,,EXPO            !* COHESIVE ZONE MATERIAL
TBDATA,1,TNMAX,GMAX,1000.0
RECTNG,0,100,0,1.5         !* DEFINE AREAS
RECTNG,0,100,0,-1.5
LSEL,S,LINE,,2,8,2         !* DEFINE LINE DIVISION
LESIZE,ALL,1.5
LSEL,INVE
LESIZE,ALL, , ,200
ALLSEL,ALL
TYPE,1                     !* MESH AREA 2
MAT,4
LOCAL,11,0,0,0,0
ESYS,11
AMESH,2
CSYS,0
TYPE,2                     !* MESH AREA 1
ESYS,11
AMESH,1
CSYS,0
! GENERATE CONTACT ELEMENTS
ESEL,S,TYPE,,1
NSLE
NSEL,R,LOC,Y
NSEL,R,LOC,X,30,100
TYPE,3
REAL,3
MAT,5
ESURF
ALLSEL,ALL
ESEL,S,TYPE,,2,2
NSEL
NSEL,R,LOC,Y
NSEL,R,LOC,X,30,100
TYPE,4
REAL,3
MAT,5
ESURF
ALLSEL,ALL
NSEL,S,LOC,X,100           !* APPLY CONSTRAINTS
D,ALL,ALL
NSEL,ALL
FINISH
/SOLU
ESEL,S,TYPE,,2
NSLE,S
NSEL,R,LOC,X
NSEL,R,LOC,Y,1.5           !* APPLY DISPLACEMENT LOADING ON TOP
D,ALL,UY,10
NSEL,ALL
ESEL,ALL
ESEL,S,TYPE,,1
NSLE,S
NSEL,R,LOC,X
NSEL,R,LOC,Y,-1.5          !* APPLY DISPLACEMENT LOADING ON BOTTOM
D,ALL,UY,-10
NSEL,ALL
ESEL,ALL
NLGEOM,ON
AUTOTS,ON
TIME,1
NSUBST,40,40,40
OUTRES,ALL,ALL
/OUT,SCRATCH
SOLVE                      !* PERFORM SOLUTION
FINISH
/POST26
NSEL,S,LOC,Y,1.5
NSEL,R,LOC,X,0
*GET,NTOP,NODE,0,NUM,MAX
NSEL,ALL
NSOL,2,NTOP,U,Y,UY
RFORCE,3,NTOP,F,Y,FY
PROD,4,3, , ,RF, , ,20
/out,czm_con_183,out
prvar,2,4
/OUT,SCRATCH
/TITLE,VM248CON, DCB: REACTION AT TOP NODE VERSES PRESCRIBED DISPLACEMENT
/AXLAB,X,DISP U (mm)
/AXLAB,Y,REACTION FORCE R (N)
/YRANGE,0,60
XVAR,2
PLVAR,4
PRVAR,UY,RF
*GET,TMAX,VARI,4,EXTREM,TMAX   !* TIME CORRESPONDING TO MAX RFORCE
FINISH
/POST1
SET, , , , ,TMAX               !* RETRIEVE RESULTS AT TMAX
NSEL,S,NODE, ,NTOP             !* SELECT NODE NTOP
/OUT,
*GET,RF_NTOP,NODE,NTOP,RF,FY   !* FY RFORCE AT NODE NTOP
*GET,UY_NTOP,NODE,NTOP,U,Y     !* DISP AT NODE NTOP CORRESPONDING TO RFORCE
RF_MAX = RF_NTOP*20            !* PLANE STRAIN OPTION AND WIDTH = 20 mm
SET,LAST                       !* RETRIEVE RESULTS AT LAST SUBSTEP
*GET,RF_END,NODE,NTOP,RF,FY    !* FY RFORCE AT NODE NTOP AT LAST SUBSTEP
*GET,UY_END,NODE,NTOP,U,Y      !* DISP AT NODE NTOP CORRESPONDING TO RFORCE
RF_END = RF_END*20             !* PLANE STRAIN OPTION AND WIDTH = 20 mm
*DIM,LABEL,CHAR,2,2
*DIM,VALUE,,2,3
*DIM,VALUE2,,2,3
LABEL(1,1) = 'RFORCE','DISP '
LABEL(1,2) = 'FY (N)','UY (mm)'
*VFILL,VALUE(1,1),DATA,60.0,1.0
*VFILL,VALUE(1,2),DATA,RF_MAX,UY_NTOP
*VFILL,VALUE(1,3),DATA,ABS(RF_MAX/60.0),ABS(UY_NTOP/1.0)
*VFILL,VALUE2(1,1),DATA,24,10.0
*VFILL,VALUE2(1,2),DATA,RF_END,UY_END
*VFILL,VALUE2(1,3),DATA,ABS(RF_END/24.0),ABS(UY_END/10.0)
SAVE,INF5
FINISH
/CLEAR,NOSTART
/OUT,SCRATCH


/TITLE, VM248CON, DELAMINATION OF DOUBLE CANTILEVER BEAM - 3D
C*** USING CONTA174 WITH DROPPED MIDSIDE NODES
/PREP7
ET,1,SOLID185	           !* 3D 8-NODE STRUCTURAL SOLID ELEMENT
KEYOPT,1,2,2               !* PLANE STRAIN
ET,2,SOLID185
KEYOPT,2,2,2
! DEFINE CONTACT ELEMENTS
ET,3,CONTA174
ET,4,TARGE170
KEYOPT,3,12,2
MP,EX,4,1.353E5            !* E11 = 135.3 GPA
MP,EY,4,9.0E3              !* E22 =   9.0 GPA
MP,EZ,4,9.0E3              !* E33 =   9.0 GPA
MP,GXY,4,5.2E3             !* G12 =   5.2 GPA
MP,GYZ,4,5.2E3
MP,GXZ,4,3.08E3
MP,PRXY,4,0.24
MP,PRXZ,4,0.24
MP,PRYZ,4,0.46
GMAX = 0.004
TNMAX = 25                 !* TENSILE STRENGTH
TB,CZM,5,,,EXPO            !* COHESIVE ZONE MATERIAL
TBDATA,1,TNMAX,GMAX,1000.0
BLC4,0,0,100,1.5,1         !* DEFINE VOLUMES
BLC4,0,0,100,-1.5,1
LSEL,S,LINE,,10,11,1       !* DEFINE LINE DIVISION
LSEL,A,LINE,,22,23,1
LESIZE,ALL,,,1
LSEL,S,LINE,,7,17,10
LESIZE,ALL,,,200
LSEL,S,LINE,,6,18,12
LESIZE,ALL,1.5
ALLSEL,ALL
TYPE,1                     !* MESH VOLUME 2
MAT,4
LOCAL,11,0,0,0,0
ESYS,11
VMESH,2
CSYS,0
TYPE,2                     !* MESH VOLUME 1
ESYS,11
VMESH,1
CSYS,0
! GENERATE CONTACT ELEMENTS
ESEL,S,TYPE,,1
NSLE
NSEL,R,LOC,Y
NSEL,R,LOC,X,30,100
TYPE,3
REAL,3
MAT,5
ESURF
ALLSEL,ALL
ESEL,S,TYPE,,2,2
NSEL
NSEL,R,LOC,Y
NSEL,R,LOC,X,30,100
TYPE,4
REAL,3
MAT,5
ESURF
ALLSEL,ALL
NSEL,S,LOC,X,100           !* APPLY CONSTRAINTS
D,ALL,ALL
NSEL,ALL
D,ALL,UZ,0
FINISH
/SOLU
ESEL,S,TYPE,,2
NSLE,S
NSEL,R,LOC,X
NSEL,R,LOC,Y,1.5           !* APPLY DISPLACEMENT LOADING ON TOP
D,ALL,UY,10
NSEL,ALL
ESEL,ALL
ESEL,S,TYPE,,1
NSLE,S
NSEL,R,LOC,X
NSEL,R,LOC,Y,-1.5          !* APPLY DISPLACEMENT LOADING ON BOTTOM
D,ALL,UY,-10
NSEL,ALL
ESEL,ALL
NLGEOM,ON
AUTOTS,ON
TIME,1
NSUBST,40,40,40
OUTRES,ALL,ALL
/OUT,SCRATCH
SOLVE                      !* PERFORM SOLUTION
FINISH
/POST26
NSEL,S,LOC,Y,1.5
NSEL,R,LOC,X,0
NSEL,R,LOC,Z,0
*GET,NTOP,NODE,0,NUM,MAX
NSEL,ALL
NSOL,2,NTOP,U,Y,UY
RFORCE,3,NTOP,F,Y,FY
PROD,4,3, , ,RF, , ,20
/out,czm_con_185,out
prvar,2,4
/OUT,SCRATCH
/TITLE,VM248CON, DCB: REACTION AT TOP NODE VERSES PRESCRIBED DISPLACEMENT
/AXLAB,X,DISP U (mm)
/AXLAB,Y,REACTION FORCE R (N)
/YRANGE,0,60
XVAR,2
PLVAR,4
PRVAR,UY,RF
*GET,TMAX,VARI,4,EXTREM,TMAX   !* TIME CORRESPONDING TO MAX RFORCE
FINISH
/POST1
SET, , , , ,TMAX               !* RETRIEVE RESULTS AT TMAX
NSEL,S,NODE, ,NTOP             !* SELECT NODE NTOP
/OUT,
*GET,RF_NTOP,NODE,NTOP,RF,FY   !* FY RFORCE AT NODE NTOP
*GET,UY_NTOP,NODE,NTOP,U,Y     !* DISP AT NODE NTOP CORRESPONDING TO RFORCE
RF_MAX = RF_NTOP*40 	       !* PLANE STRAIN OPTION AND WIDTH = 20 mm
SET,LAST                       !* RETRIEVE RESULTS AT LAST SUBSTEP
*GET,RF_END,NODE,NTOP,RF,FY    !* FY RFORCE AT NODE NTOP AT LAST SUBSTEP
*GET,UY_END,NODE,NTOP,U,Y      !* DISP AT NODE NTOP CORRESPONDING TO RFORCE
RF_END = RF_END*40 	       !* PLANE STRAIN OPTION AND WIDTH = 20 mm
*DIM,LABEL,CHAR,2,2
*DIM,VALUE,,2,3
*DIM,VALUE2,,2,3
LABEL(1,1) = 'RFORCE','DISP '
LABEL(1,2) = 'FY (N)','UY (mm)'
*VFILL,VALUE(1,1),DATA,60.0,1.0
*VFILL,VALUE(1,2),DATA,RF_MAX,UY_NTOP
*VFILL,VALUE(1,3),DATA,ABS(RF_MAX/60.0),ABS(UY_NTOP/1.0)
*VFILL,VALUE2(1,1),DATA,24,10.0
*VFILL,VALUE2(1,2),DATA,RF_END,UY_END
*VFILL,VALUE2(1,3),DATA,ABS(RF_END/24.0),ABS(UY_END/10.0)
SAVE,INF6
/OUT,SCRATCH


RESUME,INF1
/COM
/OUT,vm248,vrt
/COM,------------------- VM248 RESULTS COMPARISON -------------------
/COM,
/COM,                 |   TARGET   |   Mechanical APDL   |   RATIO
/COM,
/COM,MAX RFORCE AND CORRESPONDING DISP USING INTER202:
/COM,
*VWRITE,LABEL(1,1),LABEL(1,2),VALUE(1,1),VALUE(1,2),VALUE(1,3)
(1X,A8,A8,'   ',F10.3,'  ',1F14.3,'   ',1F15.3)
/COM,
/COM,RFORCE CORRESPONDING TO DISP U = 10.0 USING INTER202:
/COM,
*VWRITE,LABEL(1,1),LABEL(1,2),VALUE2(1,1),VALUE2(1,2),VALUE2(1,3)
(1X,A8,A8,'   ',F10.3,'  ',1F14.3,'   ',1F15.3)
/COM,
/NOPR
RESUME,INF2
/COM,MAX RFORCE AND CORRESPONDING DISP USING INTER203:
/COM,
*VWRITE,LABEL(1,1),LABEL(1,2),VALUE(1,1),VALUE(1,2),VALUE(1,3)
(1X,A8,A8,'   ',F10.3,'  ',1F14.3,'   ',1F15.3)
/COM,
/COM,RFORCE CORRESPONDING TO DISP U = 10.0 USING INTER203:
/COM,
*VWRITE,LABEL(1,1),LABEL(1,2),VALUE2(1,1),VALUE2(1,2),VALUE2(1,3)
(1X,A8,A8,'   ',F10.3,'  ',1F14.3,'   ',1F15.3)
/COM,
RESUME,INF3
/COM,MAX RFORCE AND CORRESPONDING DISP USING INTER205:
/COM,
*VWRITE,LABEL(1,1),LABEL(1,2),VALUE(1,1),VALUE(1,2),VALUE(1,3)
(1X,A8,A8,'   ',F10.3,'  ',1F14.3,'   ',1F15.3)
/COM,
/COM,RFORCE CORRESPONDING TO DISP U = 10.0 USING INTER205:
/COM,
*VWRITE,LABEL(1,1),LABEL(1,2),VALUE2(1,1),VALUE2(1,2),VALUE2(1,3)
(1X,A8,A8,'   ',F10.3,'  ',1F14.3,'   ',1F15.3)
/COM,
/NOPR
RESUME,INF4
/COM,MAX RFORCE AND CORRESPONDING DISP USING CONTA172 (DROPPED MIDSIDE NODES):
/COM,
*VWRITE,LABEL(1,1),LABEL(1,2),VALUE(1,1),VALUE(1,2),VALUE(1,3)
(1X,A8,A8,'   ',F10.3,'  ',1F14.3,'   ',1F15.3)
/COM,
/COM,RFORCE CORRESPONDING TO DISP U = 10.0 USING CONTA172 (DROPPED MIDSIDE NODES):
/COM,
*VWRITE,LABEL(1,1),LABEL(1,2),VALUE2(1,1),VALUE2(1,2),VALUE2(1,3)
(1X,A8,A8,'   ',F10.3,'  ',1F14.3,'   ',1F15.3)
/COM,
/NOPR
RESUME,INF5
/COM,MAX RFORCE AND CORRESPONDING DISP USING CONTA172:
/COM,
*VWRITE,LABEL(1,1),LABEL(1,2),VALUE(1,1),VALUE(1,2),VALUE(1,3)
(1X,A8,A8,'   ',F10.3,'  ',1F14.3,'   ',1F15.3)
/COM,
/COM,RFORCE CORRESPONDING TO DISP U = 10.0 USING CONTA172:
/COM,
*VWRITE,LABEL(1,1),LABEL(1,2),VALUE2(1,1),VALUE2(1,2),VALUE2(1,3)
(1X,A8,A8,'   ',F10.3,'  ',1F14.3,'   ',1F15.3)
/COM,
/NOPR
RESUME,INF6
/COM,MAX RFORCE AND CORRESPONDING DISP USING CONTA174 (DROPPED MIDSIDE NODES):
/COM,
*VWRITE,LABEL(1,1),LABEL(1,2),VALUE(1,1),VALUE(1,2),VALUE(1,3)
(1X,A8,A8,'   ',F10.3,'  ',1F14.3,'   ',1F15.3)
/COM,
/COM,RFORCE CORRESPONDING TO DISP U = 10.0 USING CONTA174 (DROPPED MIDSIDE NODES):
/COM,
*VWRITE,LABEL(1,1),LABEL(1,2),VALUE2(1,1),VALUE2(1,2),VALUE2(1,3)
(1X,A8,A8,'   ',F10.3,'  ',1F14.3,'   ',1F15.3)
/COM,---------------------------------------------------------------
/OUT
FINISH
*LIST,vm248,vrt
/DELETE,INF1
/DELETE,INF2
/DELETE,INF3
/DELETE,INF4
/DELETE,INF5
/DELETE,INF6
