! Copyright (C) 2016 - 2024 ANSYS, Inc. and/or its affiliates.
! SPDX-License-Identifier: MIT
!
! MIT License
!
! Copyright (c) 2024 ANSYS, Inc. All rights reserved.
!
! Permission is hereby granted, free of charge, to any person obtaining a copy
! of this software and associated documentation files (the "Software"), to deal
! in the Software without restriction, including without limitation the rights
! to use, copy, modify, merge, publish, distribute, sublicense, and/or sell
! copies of the Software, and to permit persons to whom the Software is
! furnished to do so, subject to the following conditions:
!
! The above copyright notice and this permission notice shall be included in all
! copies or substantial portions of the Software.
!
! THE SOFTWARE IS PROVIDED "AS IS", WITHOUT WARRANTY OF ANY KIND, EXPRESS OR
! IMPLIED, INCLUDING BUT NOT LIMITED TO THE WARRANTIES OF MERCHANTABILITY,
! FITNESS FOR A PARTICULAR PURPOSE AND NONINFRINGEMENT. IN NO EVENT SHALL THE
! AUTHORS OR COPYRIGHT HOLDERS BE LIABLE FOR ANY CLAIM, DAMAGES OR OTHER
! LIABILITY, WHETHER IN AN ACTION OF CONTRACT, TORT OR OTHERWISE, ARISING FROM,
! OUT OF OR IN CONNECTION WITH THE SOFTWARE OR THE USE OR OTHER DEALINGS IN THE
! SOFTWARE.

/COM,ANSYS MEDIA REL. 2023R2 (05/12/2023) REF. VERIF. MANUAL: REL. 2023R2
/VERIFY,VM88
/PREP7
/TITLE, VM88, RESPONSE OF AN ECCENTRIC WEIGHT EXCITER
! VIBRATION THEORY AND APPLICATIONS, THOMSON, 2ND PRINTING, PAGE 60, EX 3.3-1
ANTYPE,HARMIC              ! HARMONIC RESPONSE ANALYSIS
HROPT,FULL                 ! FULL HARMONIC RESPONSE
HROUT,OFF                  ! PRINT COMPLEX DISP. AS AMPLITUDES AND PHASE ANGLES
ET,1,COMBIN40
R,1,30,.11754533,.02590673 ! K = 30, C = .11754533, M = .02590673
N,1
N,2
E,2,1
FINISH
/SOLU
OUTPR,BASIC,1
HARFRQ,,5.415947           ! FREQUENCY RANGE FROM 0 TO 5.415947 HZ.
D,1,UX
F,2,FX,2.4
SOLVE
HARFRQ,,541.5947           ! FREQUENCY RANGE FROM 0 TO 541.5947 HZ.
F,2,FX,24000
SOLVE
FINISH
/POST26
FILE,,rst
NSOL,2,2,U,X,2UX
PRVAR,2
*GET,A1,VARI,2,ITIME,5.4159
*GET,A2,VARI,2,RTIME,541.59
*DIM,LABEL,CHAR,2,2
*DIM,VALUE,,2,3
LABEL(1,1) = 'AMP f=fn','AMP f=10'
LABEL(1,2) = ', in    ','0fn, in '
*VFILL,VALUE(1,1),DATA,.6,.08
*VFILL,VALUE(1,2),DATA,ABS(A1),ABS(A2)
*VFILL,VALUE(1,3),DATA,ABS(A1/.6),ABS(A2/.08)
/COM
/OUT,vm88,vrt
/COM,------------------- VM88 RESULTS COMPARISON ---------------

/COM,
/COM,                 |   TARGET   |   Mechanical APDL   |   RATIO
/COM,
*VWRITE,LABEL(1,1),LABEL(1,2),VALUE(1,1),VALUE(1,2),VALUE(1,3)
(1X,A8,A8,'   ',F10.4,'  ',F14.4,'   ',1F15.3)
/COM,-----------------------------------------------------------
/COM,
/COM,-----------------------------------------------------------
/COM,NOTE: THERE ARE VERIFIED RESULTS IN VM88  NOT CONTAINED IN
/COM,THIS TABLE
/COM,-----------------------------------------------------------
/OUT
FINISH
*LIST,vm88,vrt
