! Copyright (C) 2016 - 2024 ANSYS, Inc. and/or its affiliates.
! SPDX-License-Identifier: MIT
!
! MIT License
!
! Copyright (c) 2024 ANSYS, Inc. All rights reserved.
!
! Permission is hereby granted, free of charge, to any person obtaining a copy
! of this software and associated documentation files (the "Software"), to deal
! in the Software without restriction, including without limitation the rights
! to use, copy, modify, merge, publish, distribute, sublicense, and/or sell
! copies of the Software, and to permit persons to whom the Software is
! furnished to do so, subject to the following conditions:
!
! The above copyright notice and this permission notice shall be included in all
! copies or substantial portions of the Software.
!
! THE SOFTWARE IS PROVIDED "AS IS", WITHOUT WARRANTY OF ANY KIND, EXPRESS OR
! IMPLIED, INCLUDING BUT NOT LIMITED TO THE WARRANTIES OF MERCHANTABILITY,
! FITNESS FOR A PARTICULAR PURPOSE AND NONINFRINGEMENT. IN NO EVENT SHALL THE
! AUTHORS OR COPYRIGHT HOLDERS BE LIABLE FOR ANY CLAIM, DAMAGES OR OTHER
! LIABILITY, WHETHER IN AN ACTION OF CONTRACT, TORT OR OTHERWISE, ARISING FROM,
! OUT OF OR IN CONNECTION WITH THE SOFTWARE OR THE USE OR OTHER DEALINGS IN THE
! SOFTWARE.

/COM,ANSYS MEDIA REL. 2023R2 (05/12/2023) REF. VERIF. MANUAL: REL. 2023R2
/VERIFY,vmr049-pl3b-187
/TITLE, vmr049-pl3b-187, 3D PLASTICITY BENCHMARK
/COM, REFERENCE: NAFEMS REPORT: R0049, PL-3
/SHOW,JPEG
JPGPRF,500,100,1

/PREP7
R = 2.5E-5
ET,1,187
BLOCK,0,1,0,1,0,1
ESIZE,1
VMESH,ALL
MP,EX,1,250.0E3
MP,NUXY,1,0.25
EX=250E3
ET=50E3
EP=EX*ET/(EX-ET)
TB,PLAS,1,,,BISO
TBDATA,1,5,EP
TB,HILL,1
TBDATA,1,1.0,1.0,1.0,1.0,1.0,1.0
NSEL,S,LOC,X
D,ALL,UX
NSEL,S,LOC,Y
D,ALL,UY
NSEL,S,LOC,Y,1.0
D,ALL,UY
NSEL,S,LOC,Z
D,ALL,UZ
NSEL,S,LOC,Z,1.0
D,ALL,UZ
FINISH

/SOLU
NLGEOM,ON
NSEL,S,LOC,X,1.0
D,ALL,UX,R
NSEL,ALL
NSUBST,10,10,10,
OUTRES,ALL,5
/OUT,SCRATCH
SOLVE
NSEL,S,LOC,X,1.0
D,ALL,UX,2*R
NSEL,ALL
NSUBST,10,10,10,
OUTRES,ALL,5
SOLVE
NSEL,S,LOC,Y,1.0
D,ALL,UY,R
NSEL,ALL
NSUBST,10,10,10,
OUTRES,ALL,5
SOLVE
NSEL,S,LOC,Y,1.0
D,ALL,UY,2*R
NSEL,ALL
NSUBST,10,10,10,
OUTRES,ALL,5
SOLVE
NSEL,S,LOC,Z,1.0
D,ALL,UZ,R
NSEL,ALL
NSUBST,10,10,10,
OUTRES,ALL,5
SOLVE
NSEL,S,LOC,Z,1.0
D,ALL,UZ,2*R
NSEL,ALL
NSUBST,10,10,10,
OUTRES,ALL,5
SOLVE
NSEL,S,LOC,X,1.0
D,ALL,UX,R
NSEL,ALL
NSUBST,10,10,10,
OUTRES,ALL,5
SOLVE
NSEL,S,LOC,X,1.0
D,ALL,UX,0.0
NSEL,ALL
NSUBST,10,10,10,
OUTRES,ALL,5
SOLVE
NSEL,S,LOC,Y,1.0
D,ALL,UY,R
NSEL,ALL
NSUBST,10,10,10,
OUTRES,ALL,5
SOLVE
NSEL,S,LOC,Y,1.0
D,ALL,UY,0.0
NSEL,ALL
NSUBST,10,10,10,
OUTRES,ALL,5
SOLVE
NSEL,S,LOC,Z,1.0
D,ALL,UZ,R
NSEL,ALL
NSUBST,10,10,10,
OUTRES,ALL,5
SOLVE
NSEL,S,LOC,Z,1.0
D,ALL,UZ,0.0
NSEL,ALL
NSUBST,10,10,10,
OUTRES,ALL,5
SOLVE
FINISH

/POST26
/GROPT,VIEW,0
/GTHK,CURVE,1
/GROPT,FILL,OFF
/GRID,1
/GTHK,GRID,1
/GROPT,CGRID,1
/AXLAB,X,STEP
/AXLAB,Y,STRESS
/GTHK,AXIS,1
/GRTYP,0
/XRANGE,0,13
/YRANGE,-10,35
/OUT,
NSEL,S,LOC,X,1
NSEL,R,LOC,Y,1
NSEL,R,LOC,Z,1
*GET,N1,NODE,,NUM,MAX
ESLN,S
*GET,E1,ELEM,,NUM,MIN
ESOL,2,E1,N1,S,X,
ESOL,3,E1,N1,S,Y,
ESOL,4,E1,N1,S,Z,
ESOL,5,E1,N1,S,EQV,
PLVAR,2,3,4,5
PRVAR,2,3,4,5

*DIM,V,ARRAY,24
*DIM,VALUEX,ARRAY,5
*DO,JJ,1.0,24,3
*GET,V(JJ),VARI,2,RTIME,JJ
*ENDDO
*VFILL,VALUEX,DATA,V(1),V(4),V(7),V(10),V(13)
R1=VALUEX(1)/7.499
R2=VALUEX(2)/16.894
R3=VALUEX(3)/16.291
R4=VALUEX(4)/6.934
R5=VALUEX(5)/1.934

*DIM,V2,ARRAY,24
*DIM,VALUEY,ARRAY,5
*DO,JJ,1.0,24,3
*GET,V2(JJ),VARI,3,RTIME,JJ
*ENDDO
*VFILL,VALUEY,DATA,V2(1),V2(4),V2(7),V2(10),V2(13)
R6=VALUEY(1)/2.500
R7=VALUEY(2)/20.218
R8=VALUEY(3)/22.236
R9=VALUEY(4)/4.459
R10=VALUEY(5)/(-0.541)

*DIM,V3,ARRAY,24
*DIM,VALUEZ,ARRAY,5
*DO,JJ,1.0,24,3
*GET,V3(JJ),VARI,4,RTIME,JJ
*ENDDO
*VFILL,VALUEZ,DATA,V3(1),V3(4),V3(7),V3(10),V3(13)
R11=VALUEZ(1)/2.500
R12=VALUEZ(2)/12.886
R13=VALUEZ(3)/23.972
R14=VALUEZ(4)/13.606
R15=VALUEZ(5)/(-1.393)

*DIM,V4,ARRAY,24
*DIM,VALUEEF,ARRAY,5
*DO,JJ,1.0,24,3
*GET,V4(JJ),VARI,5,RTIME,JJ
*ENDDO
*VFILL,VALUEEF,DATA,V4(1),V4(4),V4(7),V4(10),V4(13)
R16=VALUEEF(1)/5.000
R17=VALUEEF(2)/6.359
R18=VALUEEF(3)/6.976
R19=VALUEEF(4)/8.195
R20=VALUEEF(5)/2.994

*DIM,STEP,CHAR,10
*DIM,TARGETX,CHAR,10
*DIM,TARGETY,CHAR,10
*DIM,TARGETZ,CHAR,10
*DIM,TARGETEF,CHAR,10
*DIM,RATIOX,,5,1
*DIM,RATIOY,,5,1
*DIM,RATIOZ,,5,1
*DIM,RATIOEF,,5,1
STEP(1)='1.0','4.0','7.0','10.0','13.0'
TARGETX(1)='7.500','16.894','16.291','6.934','1.934'
TARGETY(1)='2.500','20.218','22.236','4.459','-0.541'
TARGETZ(1)='2.500','12.886','23.972','13.606','-1.393'
TARGETEF(1)='5.000','6.359','6.976','8.195','2.994'
*VFILL,RATIOX,DATA,R1,R2,R3,R4,R5
*VFILL,RATIOY,DATA,R6,R7,R8,R9,R10
*VFILL,RATIOZ,DATA,R11,R12,R13,R14,R15
*VFILL,RATIOEF,DATA,R16,R17,R18,R19,R20
/COM,
/COM, ----------- vmr049-pl3b-187 RESULTS COMPARISON --------------
/COM,
/COM, vmr049-pl3b-187.jpeg RESULTS SHOULD MATCH R0049 NAFEMS MANUAL
/COM, GRAPH RESULTS ON PAGE 55, FIGURE 2.17(B).  THE RESULTS
/COM, DISPLAYED ARE INCREMENTED FOR THIS PURPOSE.
/COM,
/COM,
/COM, ------ vmr049-pl3b-187 STRESS RESULTS IN X DIRECTION -------
/COM,
/COM, |  STEP  |  TARGET  |  Mechanical APDL  |  RATIO
/COM,
*VWRITE,STEP(1),TARGETX(1),VALUEX(1,1),RATIOX(1,1)
(1X,A8,'   ',1x,A8,'   ',F14.3,'   ',F12.3,'   ')
/COM,
/COM, ------ vmr049-pl3b-187 STRESS RESULTS IN Y DIRECTION -------
/COM,
/COM, |  STEP  |  TARGET  |  Mechanical APDL  |  RATIO
/COM,
*VWRITE,STEP(1),TARGETY(1),VALUEY(1,1),RATIOY(1,1)
(1X,A8,'   ',1x,A8,'   ',F14.3,'   ',F12.3,'   ')
/COM,
/COM,
/COM, ------ vmr049-pl3b-187 STRESS RESULTS IN Z DIRECTION -------
/COM,
/COM, |  STEP  |  TARGET  |  Mechanical APDL  |  RATIO
/COM,
*VWRITE,STEP(1),TARGETZ(1),VALUEZ(1,1),RATIOZ(1,1)
(1X,A8,'   ',1x,A8,'   ',F14.3,'   ',F12.3,'   ')
/COM,
/COM,
/COM, ------ vmr049-pl3b-187 EFFECTIVE STRESS RESULTS -------
/COM,
/COM, |  STEP  |  TARGET  |  Mechanical APDL  |  RATIO
/COM,
*VWRITE,STEP(1),TARGETEF(1),VALUEEF(1,1),RATIOEF(1,1)
(1X,A8,'   ',1x,A8,'   ',F14.3,'   ',F12.3,'   ')
/COM,
/COM,
FINISH

/POST26
*DIM,LABEL1,CHAR,4
*DIM,VALUE1,,4,3
LABEL1(1) = ' SX ',' SY ',' SZ ',' SEFF '
*VFILL,VALUE1(1,1),DATA,VALUEX(5),VALUEY(5),VALUEZ(5),VALUEEF(5)
*VFILL,VALUE1(1,2),DATA,R5,R10,R15,R20
*DIM,LABEL2,CHAR,2
LABEL2(1) = 'vmr049-','pl3b-187'

/OUT,vmr049-pl3b-187,vrt
/COM
/COM,------------------- vmr049-pl3b RESULTS COMPARISON ---------------------
/COM,
/COM,            |   Mechanical APDL   |   RATIO  |         INPUT         |
/COM,
/COM, SOLID187
*VWRITE,LABEL1(1),VALUE1(1,1),VALUE1(1,2),LABEL2(1),LABEL2(2)
(1X,A8,'      ',F14.4,'      ',F9.4,'     ',A7,A8)
*VWRITE,LABEL1(2),VALUE1(2,1),VALUE1(2,2),LABEL2(1),LABEL2(2)
(1X,A8,'      ',F14.4,'      ',F9.4,'     ',A7,A8)
*VWRITE,LABEL1(3),VALUE1(3,1),VALUE1(3,2),LABEL2(1),LABEL2(2)
(1X,A8,'      ',F14.4,'      ',F9.4,'     ',A7,A8)
*VWRITE,LABEL1(4),VALUE1(4,1),VALUE1(4,2),LABEL2(1),LABEL2(2)
(1X,A8,'      ',F14.4,'      ',F9.4,'     ',A7,A8)
/COM,
/COM,----------------------------------------------------------------
/OUT

FINISH
*LIST,vmr049-pl3b-187,vrt
