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/batch

FilePrefix = 'structure'


! ANSYS input file written by Workbench version 2019 R3
! File used for geometry attach: /scratch/ws/0/jack_sb-FSplayground_00002/FSCoupledInstationarySim/Panel_3D/01_FullMonty_noConffass/Ansys/Workbench/Panel_3D_500x200_incInflow_files/dp0/SYS/DM/SYS.agdb
/title,Panel_3D_500x200--Transient (A5)
/com,--- Data in consistent MKS units. See Solving Units in the help system for more information.
/units,MKS
/prep7
! Turn off shape checking because checks already performed inside WB mesher.
! See help system for more information.
SHPP,OFF,,NOWARN
etcon,set             ! allow ANSYS to choose best KEYOP's for 180x elements
/com,*********** Nodes for the whole assembly ***********
nblock,3,,28351
(1i9,3e20.9e3)
        1     5.474838289E-03     5.186163437E-03    -1.067900000E-03
        2     5.474911181E-03     1.031168516E-02    -1.067900000E-03
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-1
/com,*********** Elements for Body 1 "Solid" ***********
et,1,186
keyo,1,2,1          ! set full integration on SOLID186
eblock,19,solid,,3588
(19i9)
        1        1        1        1        0        0        0        0       20        0        1     3458     7440     7402     7311     3459     6954     6955     6956
    17943    25737    25647    17942    17946    25064    25066    17947    17941    25065    25067    25069
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-1
/com,*********** Send User Defined Coordinate System(s) ***********
csys,0
toffst,273.15,  ! Temperature offset from absolute zero
/com,*********** Set Reference Temperature ***********
tref,22.
/com,*********** Send Materials ***********
Temperature = 'TEMP' ! Temperature
MP,DENS,1,2770,	! kg m^-3
MP,ALPX,1,2.3e-05,	! C^-1
MP,C,1,875,	! J kg^-1 C^-1
MPTEMP,,,,,,,,
MPTEMP,1,-100
MPTEMP,2,0
MPTEMP,3,100
MPTEMP,4,200
MPDATA,KXX,1, ,114,144,165,175,	! W m^-1 C^-1
MPTEMP,,,,,,,,
MPTEMP,,,,,,,,
MPTEMP,1,0
MPTEMP,2,20
MPTEMP,3,100
MPDATA,RSVX,1, ,2.43e-08,2.67e-08,3.63e-08,	! kg m^3 A^-2 s^-3
MPTEMP,,,,,,,,
MP,EX,1,71000000000,	! Pa
MP,NUXY,1,0.33,
MP,MURX,1,1,

!************************* Model Summary ********************
!Solid,	Aluminum Alloy,	matid,	1
!************************* End Model Summary ********************
/com,*********** Send Named Selection as Node Component ***********
CMBLOCK,DOWNSTREAMCLAMPING,NODE,      198
(8i10)
      6917      6918      6919      6920      6921      6922      6923      6924
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/com,*********** Send Named Selection as Node Component ***********
CMBLOCK,INTERFACE,NODE,    11027
(8i10)
      3459      3460      3461      3462      3463      3464      3465      3466
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/com,*********** Send Named Selection as Node Component ***********
CMBLOCK,UPSTREAMCLAMPING,NODE,      198
(8i10)
      7047      7048      7049      7050      7051      7052      7053      7054
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/com,*********** Fixed Supports ***********
CMBLOCK,_FIXEDSU,NODE,      396
(8i10)
      6917      6918      6919      6920      6921      6922      6923      6924
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cmsel,s,_FIXEDSU
d,all,all
nsel,all
/com,*********** Define Pressure Using Surface Effect Elements ***********
et,2,154
eblock,10,,,3588
(15i9)
    12743        2        2        2        0     6956     3459     6954     6955    17947    17946    25064    25066
    12744        2        2        2        0     6957     3497     3459     6956    18061    17945    17947    25068
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-1
esel,s,type,,2
esel,all
esel,all
fini


!! Export node IDs and coordinates
! /prep7
! NSLE,s,all
! nwrite,FilePrefix,nodeFile


/com,****************************************************************************
/com,*************************    SOLUTION       ********************************
/com,****************************************************************************
/solu
antype,4                   ! transient analysis
nlgeom,on                  ! Turn on Large Deformation Effects
kbc,1                      ! stepped BC's
_thickRatio=  0     ! Ratio of thick parts in the model
eqsl,sparse,,,,,1
cntr,print,1               ! print out contact info and also make no initial contact an error
dmpoption,emat,no             ! Don't combine emat file for DANSYS
dmpoption,esav,no             ! Don't combine esav file for DANSYS
trnopt,full,,,,,hht        ! HHT time integration method
tintp,0.1 ! Numerical Damping
nldiag,cont,iter           ! print out contact info each equilibrium iteration
rescontrol,define,last,last,,dele	   ! Program Controlled
/com,****************************************************
/com,******************* SOLVE FOR LS 1 OF 1 ****************
esel,s,type,,2
nsle
!sf,all,pres,100.
nsel,all
esel,all
esel,all

!! Let FSAnsysInterface handle time control
! autots,on                   ! User turned on automatic time stepping
! nsub,5,10,5,OFF
! time,0.1


timint,on                  ! Turn on time integration effects
outres,erase
outres,all,none
outres,nsol,all,
outres,rsol,all
outres,eangl,all
outres,etmp,all
outres,veng,all
outres,strs,all,
outres,epel,all,
outres,eppl,all,
outres,cont,all,
outres,v,all,
outres,a,all,

/input, initial_conditions.ans

! *********** WB SOLVE COMMAND ***********
! check interactive state
*get,ANSINTER_,active,,int
*if,ANSINTER_,ne,0,then
/eof
*endif
solve
/com *************** Write FE CONNECTORS *********
CEWRITE,file,ce,,INTE
/com,****************************************************
/com,*************** FINISHED SOLVE FOR LS 1 *************
/post1
fini
