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/batch

FilePrefix = 'structure'
/INPUT %FilePrefix%.sol.pref.ans

/com,--- Data in consistent MKS units. See Solving Units in the help system for more information.
/units,MKS
/prep7
! Turn off shape checking because checks already performed inside WB mesher.
! See help system for more information.
SHPP,OFF,,NOWARN
etcon,set             ! allow ANSYS to choose best KEYOP's for 180x elements
/com,*********** Nodes for the whole assembly ***********
nblock,3,,1389
(1i9,3e20.9e3)
        1     2.500000000E-02     2.500000000E-02    -1.000000000E-03
        2     2.500000000E-02     5.000000000E-02    -1.000000000E-03
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-1
/com,*********** Nodes for all Remote Points ***********
nblock,3
(1i9,3e20.9e3)
     7354     0.000000000E+00     1.000000015E-01     5.000000237E-04
     7355     5.000000000E-01     1.000000015E-01     5.000000237E-04
-1
/com,*********** Elements for Body 1 "Solid" ***********
et,1,186
keyo,1,2,1          ! set full integration on SOLID186
eblock,19,solid,,160
(19i9)
        1        1        1        1        0        0        0        0       20        0        1      133      378      371      352      134      273      274      275
      803     1257     1239      802      806     1109     1111      807      801     1110     1112     1114
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-1
/com,*********** Send User Defined Coordinate System(s) ***********
csys,0
toffst,273.15,  ! Temperature offset from absolute zero
/com,*********** Set Reference Temperature ***********
tref,22.
/com,*********** Send Materials ***********
Temperature = 'TEMP' ! Temperature
MP,DENS,1,7850,	! kg m^-3
MP,ALPX,1,1.2e-05,	! C^-1
MP,C,1,434,	! J kg^-1 C^-1
MP,KXX,1,60.5,	! W m^-1 C^-1
MP,RSVX,1,1.7e-07,	! kg m^3 A^-2 s^-3
MP,EX,1,200000000000,	! Pa
MP,NUXY,1,0.3,
MP,MURX,1,10000,

!************************* Model Summary ********************
!Solid,	Structural Steel,	matid,	1
!************************* End Model Summary ********************
/com,*********** Send Named Selection as Node Component ***********
CMBLOCK,INTERFACE,NODE,      537
(8i10)
       134       135       136       137       138       139       140       141
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/com,*********** Send Named Selection as Node Component ***********
CMBLOCK,SUPPORT_XMIN,NODE,       43
(8i10)
       294       295       296       297       298       299       300       301
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/com,*********** Send Named Selection as Node Component ***********
CMBLOCK,SUPPORT_XMAX,NODE,       43
(8i10)
       267       268       269       270       271       272       273       274
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CMBLOCK,INTERFACE_NODES,NODE,      537
(8i10)
       134       135       136       137       138       139       140       141
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/com,*********** Define Pressure Using Surface Effect Elements ***********
et,2,154
eblock,10,,,160
(15i9)
     1003        2        2        2        0      275      134      273      274      807      806     1109     1111
     1004        2        2        2        0      276      141      134      275      828      805      807     1113
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-1
esel,s,type,,2
esel,all

*DIM,_loadvari100,TABLE,1,1,1,TIME,
! Time values
_loadvari100(1,0,1) = 0.1
! Load values
_loadvari100(1,1,1) = 10000.

/com,*********** Create Remote Point "Internal Remote Point" ***********
! -------- Remote Point Used by "Remote Displacement" --------
*set,tid,4
*set,cid,3
et,cid,174
et,tid,170
keyo,tid,2,1               ! Don't fix the pilot node
keyo,tid,4,111111
keyo,cid,12,5              ! Bonded Contact
keyo,cid,4,2               ! Rigid CERIG style load
keyo,cid,2,2               ! MPC style contact
eblock,10,,,8
(15i9)
     1163        3        3        3        0      344      295      294      351     1154     1151     1152     1231
     1164        3        3        3        0      345      296      295      344     1156     1153     1154     1230
     1165        3        3        3        0      346      297      296      345     1158     1155     1156     1232
     1166        3        3        3        0      347      298      297      346     1160     1157     1158     1233
     1167        3        3        3        0      348      299      298      347     1162     1159     1160     1234
     1168        3        3        3        0      349      300      299      348     1164     1161     1162     1235
     1169        3        3        3        0      350      301      300      349     1166     1163     1164     1236
     1170        3        3        3        0      343      302      301      350     1168     1165     1166     1229
-1
*set,_npilot,7354
_npilot95=_npilot
type,tid
mat ,cid
real,cid
tshape,pilo
en,1171,_npilot
tshape
/com,*********** Create Remote Point "Internal Remote Point 2" ***********
! -------- Remote Point Used by "Remote Displacement 2" --------
*set,tid,6
*set,cid,5
et,cid,174
et,tid,170
keyo,tid,2,1               ! Don't fix the pilot node
keyo,tid,4,111111
keyo,cid,12,5              ! Bonded Contact
keyo,cid,4,2               ! Rigid CERIG style load
keyo,cid,2,2               ! MPC style contact
eblock,10,,,8
(15i9)
     1172        5        5        5        0      372      267      322      342     1098     1097     1207     1228
     1173        5        5        5        0      373      268      267      372     1100     1096     1098     1258
     1174        5        5        5        0      374      269      268      373     1102     1099     1100     1259
     1175        5        5        5        0      375      270      269      374     1104     1101     1102     1260
     1176        5        5        5        0      376      271      270      375     1106     1103     1104     1261
     1177        5        5        5        0      377      272      271      376     1108     1105     1106     1262
     1178        5        5        5        0      378      273      272      377     1110     1107     1108     1263
     1179        5        5        5        0      371      274      273      378     1112     1109     1110     1257
-1
*set,_npilot,7355
_npilot98=_npilot
type,tid
mat ,cid
real,cid
tshape,pilo
en,1180,_npilot
tshape
/com,*********** Construct Remote Displacement ***********

*DIM,_loadvari94ux,TABLE,2,1,1,TIME,
! Time values
_loadvari94ux(1,0,1) = 0.
_loadvari94ux(2,0,1) = 0.1
! Load values
_loadvari94ux(1,1,1) = 0.
_loadvari94ux(2,1,1) = 0.


*DIM,_loadvari94uy,TABLE,2,1,1,TIME,
! Time values
_loadvari94uy(1,0,1) = 0.
_loadvari94uy(2,0,1) = 0.1
! Load values
_loadvari94uy(1,1,1) = 0.
_loadvari94uy(2,1,1) = 0.


*DIM,_loadvari94uz,TABLE,2,1,1,TIME,
! Time values
_loadvari94uz(1,0,1) = 0.
_loadvari94uz(2,0,1) = 0.1
! Load values
_loadvari94uz(1,1,1) = 0.
_loadvari94uz(2,1,1) = 0.


*DIM,_loadvari94rotx,TABLE,2,1,1,TIME,
! Time values
_loadvari94rotx(1,0,1) = 0.
_loadvari94rotx(2,0,1) = 0.1
! Load values
_loadvari94rotx(1,1,1) = 0.
_loadvari94rotx(2,1,1) = 0.


*DIM,_loadvari94roty,TABLE,2,1,1,TIME,
! Time values
_loadvari94roty(1,0,1) = 0.
_loadvari94roty(2,0,1) = 0.1
! Load values
_loadvari94roty(1,1,1) = 0.
_loadvari94roty(2,1,1) = 0.


*DIM,_loadvari94rotz,TABLE,2,1,1,TIME,
! Time values
_loadvari94rotz(1,0,1) = 0.
_loadvari94rotz(2,0,1) = 0.1
! Load values
_loadvari94rotz(1,1,1) = 0.
_loadvari94rotz(2,1,1) = 0.

/com,*********** Construct Remote Displacement ***********

*DIM,_loadvari97ux,TABLE,2,1,1,TIME,
! Time values
_loadvari97ux(1,0,1) = 0.
_loadvari97ux(2,0,1) = 0.1
! Load values
_loadvari97ux(1,1,1) = 0.
_loadvari97ux(2,1,1) = 0.


*DIM,_loadvari97uy,TABLE,2,1,1,TIME,
! Time values
_loadvari97uy(1,0,1) = 0.
_loadvari97uy(2,0,1) = 0.1
! Load values
_loadvari97uy(1,1,1) = 0.
_loadvari97uy(2,1,1) = 0.


*DIM,_loadvari97uz,TABLE,2,1,1,TIME,
! Time values
_loadvari97uz(1,0,1) = 0.
_loadvari97uz(2,0,1) = 0.1
! Load values
_loadvari97uz(1,1,1) = 0.
_loadvari97uz(2,1,1) = 0.


*DIM,_loadvari97rotx,TABLE,2,1,1,TIME,
! Time values
_loadvari97rotx(1,0,1) = 0.
_loadvari97rotx(2,0,1) = 0.1
! Load values
_loadvari97rotx(1,1,1) = 0.
_loadvari97rotx(2,1,1) = 0.


*DIM,_loadvari97roty,TABLE,2,1,1,TIME,
! Time values
_loadvari97roty(1,0,1) = 0.
_loadvari97roty(2,0,1) = 0.1
! Load values
_loadvari97roty(1,1,1) = 0.
_loadvari97roty(2,1,1) = 0.


*DIM,_loadvari97rotz,TABLE,2,1,1,TIME,
! Time values
_loadvari97rotz(1,0,1) = 0.
_loadvari97rotz(2,0,1) = 0.1
! Load values
_loadvari97rotz(1,1,1) = 0.
_loadvari97rotz(2,1,1) = 0.


/COM,*** Create a component for all remote displacements ***
CMBLOCK,REMOTEDISPALL,NODE,        2
(8i10)
      7354      7355

esel,all
fini
/com,****************************************************************************
/com,*************************    SOLUTION       ********************************
/com,****************************************************************************
/solu
!antype,4                   ! transient analysis
kbc,1                      ! stepped BC's
eqsl,sparse,,,,,1
cntr,print,1               ! print out contact info and also make no initial contact an error
dmpoption,emat,no             ! Don't combine emat file for DANSYS
dmpoption,esav,no             ! Don't combine esav file for DANSYS
trnopt,full,,,,,hht        ! HHT time integration method
tintp,0.1  ! Numerical Damping
nldiag,cont,iter           ! print out contact info each equilibrium iteration
rescontrol,define,last,last,,dele	   ! Program Controlled
/com,****************************************************
/com,******************* SOLVE FOR LS 1 OF 1 ****************
esel,s,type,,2
nsle
!sf,all,pres,%_loadvari100%
nsel,all
esel,all
d,7354,ux,%_loadvari94ux%
d,7354,uy,%_loadvari94uy%
d,7354,uz,%_loadvari94uz%
d,7354,rotx,%_loadvari94rotx%
d,7354,roty,%_loadvari94roty%
d,7354,rotz,%_loadvari94rotz%
d,7355,ux,%_loadvari97ux%
d,7355,uy,%_loadvari97uy%
d,7355,uz,%_loadvari97uz%
d,7355,rotx,%_loadvari97rotx%
d,7355,roty,%_loadvari97roty%
d,7355,rotz,%_loadvari97rotz%
esel,all
!autots,on                   ! User turned on automatic time stepping
!deltim,0.01,0.001,0.1,OFF
!time,0.1
timint,on                  ! Turn on time integration effects
outres,erase
outres,all,none
outres,nsol,all,
outres,rsol,all
outres,strs,all,
outres,epel,all,
outres,eppl,all,
outres,v,all,
outres,a,all,
stabilize,off                   ! Stabilization turned OFF by user
! ****** Begin Command Snippet ******
!   Commands inserted into this file will be executed just prior to the ANSYS SOLVE command.
!   These commands may supersede command settings set by Workbench.

!   Active UNIT system in Workbench when this object was created:  Metric (m, kg, N, s, V, A)
!   NOTE:  Any data that requires units (such as mass) is assumed to be in the consistent solver unit system.
!                See Solving Units in the help system for more information.


/INPUT, applyLoads.ans
! ****** End   Command Snippet ******
! *********** WB SOLVE COMMAND ***********
! check interactive state
*get,ANSINTER_,active,,int
*if,ANSINTER_,ne,0,then
/eof
*endif
solve
/com *************** Write FE CONNECTORS *********
CEWRITE,file,ce,,INTE
/com,****************************************************
/com,*************** FINISHED SOLVE FOR LS 1 *************
/post1
fini
